# ARCHIVED 2026-09-22 -- kept for reference, NOT maintained.  Superseded by the
# two-piston decks in simulations/triaxial_*_two_pist/ (which keep this deck's
# strain sweep, hold sizing, observables and file conventions).  To run it again,
# move its folder back: git mv archive/simulations/<folder> simulations/
# (run_lammps.sh, postprocess.sh and continue_sim.sh key on the folder name).
#
# ============ Triaxial Compression Simulation (piston-loaded gel) ============
# COMPRESSION MODE ONLY.  Split out of slab_with_flow.lmp (which carried both
# compression and permeation modes behind compression_mode logic gates) so the
# compression path is self-contained and free of per-step mode branching.
# The permeation counterpart lives in ../triaxial_permeation/.
#
# Starting from an equilibrated configuration produced by the
# slab_with_support workflow on the PERIODIC slab generator
# (slab_with_support_periodic.ipynb).
# Variables from bash script: dataname, interaction, epsSS, epsSP, nsteps
# Optional -var overrides (index-style knobs): compressions, hold_auto, skip_widom,
#   drive_split, v_piston_prod, npt_p05_steps, t_seat, nsteps_settle, ref_avg_steps,
#   ref_nfreq, min_iter  (the last seven exist for short local smoke tests)
#
# Atom types: 1=crosslink, 2=chain bead, 3=solvent, 4=support(frozen),
#             5=piston(mobile).  NO side walls (the periodic geometry is
#             laterally periodic — there is nothing to confine).
#
# GEOMETRY (periodic generator):
#   The slab spans the WHOLE x-y plane: box_x = box_y = units*a EXACTLY, no
#   side solvent padding.  Network bonds wrap the x and y PBC only; z is a
#   finite slab (no bonds cross z).  boundary p p p with a single z-period
#   that recirculates through the z-PBC:
#       below solvent | support sheet (type4, frozen) | gap | polymer slab |
#       top solvent (piston type5 parked high) -> wraps to next image's support.
#   Because the slab is laterally periodic and unconfined, x,y are free to
#   relax; z compression is applied solely by the two plates -- piston driven DOWN
#   and support driven UP, half the closure each (NO box barostat in z).
#   Single support + single piston sheet → c_piston_fz/(lx*ly) is the true
#   piston stress (no multi-period normalisation needed).
#
# Reduced LJ units: tau = sigma*sqrt(m/epsilon)
# dt = 0.005 → 1e6 steps ≈ 4.1e3 tau
#
# Behaviour:
#   - Piston-solvent WCA is OFF throughout; the piston passes through the
#     solvent freely and loads the gel network directly.
#   - Phase 0:   NPT equilibration (Langevin + ANISO NPH at P_target), 2M steps.
#                NOT a formality: the generator's data file is at T ~ 1.24 (its
#                Nose-Hoover NPT does not hold T = 1), so this phase cools it to
#                T = 1 and the barostat shrinks the box (~0.8% in x,y, ~5% in z)
#                while the gel deswells ~5% -- a full poroelastic relaxation
#                (tau_1 ~ 2M steps).  Tracked from step 0 by the trk_* loggers and
#                10k-step thermo; check the convergence figure before trusting a
#                run.  Rigid bodies temporarily on nve+setforce so they scale
#                with the box; the box is frozen for every phase afterwards.
#   - Phase 1.25: bring the piston down (velocity) to first gel contact and
#                record L0 = gel_lz_rg (equilibrium-swollen Rg reference
#                thickness).  No body-force seating — the piston pressure seats
#                the gel on the support itself in Phase 2.
#   - Phase 1.5: pre-compression REFERENCE window.  Piston held still for
#                ref_avg_steps; ALL observables (partial stresses, σ_ss,
#                σ_pp, solvent mass density, AND the block-averaged piston
#                force = the reference preload) are averaged into "_ref_"
#                files, emitting several snapshots so the notebook can form CIs.
#   - Phase 2 (production): STRAIN-controlled, SYMMETRIC drive (2026-09-18).  Each
#                level closes the plate gap by strain*L0_bb with the piston driven
#                DOWN and the support driven UP at v_piston_prod/2 each
#                (drive_split = 0.5), so the gel mid-plane stays put and both faces
#                are loaded alike; both plates are then FROZEN and the network
#                stress is MEASURED over an auto-sized hold.  M = stress / strain.
#                Before 2026-09-18 the whole closure came from the piston alone,
#                which loaded the top face first and left the hold-onset state --
#                and the odd-mode D_c consolidation fit -- asymmetric about the gel
#                centre.  -var drive_split 1.0 restores the top-only protocol.
#
# Recorded observables (z-profiles, z-normal binning; see ANALYSIS sections):
#   1) partial stresses of polymer and solvent (group-based stress/atom).  NOTE:
#      these INCLUDE the kinetic term n*kT -- see the KINETIC TERM note below.
#   2) solvent-only stress  sigma_s,ss  (pair/local ss-pair virial; virial-only,
#      so the notebook adds n_s*kT to it -- ADD_KINETIC in the Config cell)
#   3) polymer-only stress  sigma_p,pp  (pair/local pp-pair virial + FENE bond
#                                        virial; virial-only, same treatment)
#   4) solvent MASS density profile                                 [NEW]
#   5) (mass fraction rho_s/rho_s0 is derived in the notebook from 4 + reference)
# Dual-resolution z-binning: a coarse global profile plus finer bins in user-
# defined windows around the support and the piston.               [NEW]


# ==========================================================================
#                              PARAMETERS
# ==========================================================================

# ----- Continuation flag -----
# 0 = fresh start (default)
# 1 = continuation from a final .data file (via continue_sim.sh)
#
# When cont=1 the following are skipped (data file already holds the state):
#   Phase 0    — NPT (Langevin+NPH) equilibration (box/piston stay as-is)
#   Phase 1.25 — piston contact approach + L0 recording (so L0 is UNDEFINED under cont=1)
#   Phase 1.5  — reference recording (reference files already exist)
# NOTE: cont=1 means "extend the equilibration hold at whatever ONE level is
#   supplied via -var compressions" -- it is never a fresh multi-value sweep.
#   continue_sim.sh enforces this: it auto-detects the last _c<level> reached
#   by the original run and passes that single value back, so `compressions`
#   is always a one-element list under cont=1. A new cont-gate right before
#   PHASE 2a's drive (below) skips the drive-to-target (which needs L0_bb/
#   piston_seat_z, undefined here since Phase 1.25 is skipped) and jumps
#   straight to the equilibration-only measurement hold -- no re-driving.
variable cont index 0

# ----- Physical Parameters -----
variable sigma         equal 1.0
variable temp_target   equal 1.0
variable P_target      equal 1.5
variable timestep_prod equal 0.005

# ----- Phase 0: NVT equilibration steps -----
variable comp_setup_freq equal 50000    # compression Phase 0 NVT

# ----- Compression Phase 2 (STRAIN-CONTROLLED) -----
# The gel is loaded by PRESCRIBING a strain (driving the piston DOWN at fixed
# velocity to a displacement = strain*L0_bb), then FREEZING the piston and
# MEASURING the relaxed network stress during the hold.  M is read as
# (measured stress)/(prescribed strain).  From prior runs strain 0.1 -> M ~ 1.
# v_piston_prod is the gap-CLOSURE rate of the production strain drive (the seating
# approach derives its own velocities from t_seat).
variable v_piston_prod   index 0.04     # sigma/tau, total plate-gap closure rate (= 1 sigma / 5000 steps)

# ---- SYMMETRIC DRIVE (2026-09-18): how the closure is split between the plates ----
# drive_split = share of each level's closure strain*L0_bb taken by the PISTON
# (top, driven down); the SUPPORT (bottom, driven up) takes the rest.  0.5 = half
# on each face (default, keeps the gel mid-plane fixed and the hold-onset state
# symmetric); 1.0 = the pre-2026-09-18 top-only protocol.  The closure RATE is
# v_piston_prod whatever the split, so drive lengths, the drive-movie cadence and
# the halt logic (which watches the plate GAP) are unchanged.
variable drive_split     index 0.5
variable vdrive_pist     equal ${drive_split}*${v_piston_prod}          # piston speed, DOWN
variable vdrive_supp     equal (1.0-${drive_split})*${v_piston_prod}    # support speed, UP

# ---- STRAIN SWEEP: cumulative strain targets --------------------------------
# `compressions` is an index-style variable supplied on the command line by
# run_lammps.sh as:  -var compressions 0.05 0.10 0.15 0.20
# (set in triaxial_compression.batch via STRAIN_TARGETS=(...)).  The variable
# name `compressions` is kept so the _c<val> output tag and the notebook's
# COMP_LEVELS reader still work; THE VALUES ARE STRAIN TARGETS (fraction of
# L0_bb).  If NOT supplied, the in-script default below (single strain 0.10) is
# used.  The sweep is CUMULATIVE: the piston is driven DOWN to each successive
# strain (never unloaded), holding a measurement window at each -- like
# shear_slab.lmp's cumulative strain loop.  cont=1 continuation always supplies
# a single value here (the last level reached) -- see the cont=1 note above.
variable compressions      index 0.10
variable compressions_list index "STALE-run_lammps.sh--no-list-passed--running-single-default-only"

# Drive-phase SAFETY CAP: max steps for the velocity drive to the strain target.
# fix halt normally stops the drive at the target displacement long before this
# (a ~5-10% increment needs only ~10^4 steps at v_piston_prod); this is only a
# buffer so a level cannot run away if the halt somehow never fires.
variable nsteps_comp equal 500000

# ---- AUTO-SIZED measurement HOLD, one length per strain level ---------------
# WHY: the hold must outlast the gel's poroelastic (consolidation) relaxation.
# If it does not, the piston reaction force is still DECAYING when the notebook
# averages it, so M_piston reads HIGH -- which is exactly the M_piston ~6% above
# M_network seen on the 5M-step hold (measured +6.5%, predicted +7.3%, below).
#
# MODEL: both faces of the slab are solvent-permeable (pair_coeff 3 4 / 3 5 are
# OFF), so the held gel is the two-sided 1-D consolidation problem and its
# SLOWEST mode decays as exp(-t/tau_1) with
#       tau_1 = L^2 / (pi^2 * D_c),      L = compressed gel thickness.
# Holding n_tau_hold * tau_1 leaves an end-of-hold residual exp(-n_tau_hold);
# averaged over the trailing quarter of the hold (the notebook's plateau window)
# n_tau_hold = 5.5 leaves ~1% residual stress.  L is read LIVE from the BB gel
# thickness the moment the piston freezes, so EVERY sweep level is sized on its
# own compressed thickness: tau_1 ~ (1-eps)^2 and deeper levels automatically get
# proportionally SHORTER holds.  (Conservative: D_c also GROWS with compression,
# by roughly M/K, which this fixed-D_c sizing ignores.)
#
# D_c ~ 0.17 sigma^2/tau comes from the 14M-step slab_with_support equilibration
# that produced this run's input .data file: the free-swelling gel volume (both
# the BB and the Rg^3 measure) decays to its plateau with a late-time constant
# tau_1 ~ 2e6 steps = 1e4 tau at L ~ 131 sigma, so D_c = L^2/(pi^2 tau_1) ~ 0.17.
# NOTE this is 2-3x SMALLER than the D_c the notebook's section-7 displacement fit
# returns (~0.41): that fit is dominated by the FAST face-skin relaxation early in
# the hold, while the piston force follows the slow k=1 mode.  Size on the SLOW one.
#
# WALL TIME: at L0_bb ~ 131 sigma this gives ~9.1M steps at eps=0.10, falling to
# ~7.2M at eps=0.20 -- roughly 2x the old flat 5M hold, and a 4-level sweep is
# ~33M steps of MD.  Size #SBATCH --time in triaxial_compression.batch accordingly
# (or lean on continue_sim.sh); the banner below prints the estimate per level.
variable Dc_est      equal 0.17      # sigma^2/tau, SLOW (collective) gel-solvent diffusivity
variable n_tau_hold  equal 5.5       # holds per slowest mode; ~1% residual over the plateau window
variable hold_min    equal 500000    # floor on any auto-sized hold (safety)
variable hold_round  equal 100000    # holds are rounded UP to a multiple of this, so the file-name
                                     # tag reads 9200000 rather than a timestamp-like 9113216
variable pi_sq       equal 9.86960440108936   # pi^2 (LAMMPS-version-proof; no PI constant needed)
# hold_auto: 1 = size every level from tau_1 (default).  0 = old behaviour, a flat
# ${nsteps} hold at every level.  Override on the command line with -var hold_auto 0.
# NOTE on ${nsteps}: it is the flat-hold fallback and the tag of the SETUP-phase files
# (gel_setup traj, Phase-0.5 box/gel trackers) only.  Every reference and production
# file is tagged with its level's hold length instead -- see the OUTPUT-FILE TAG block
# after the reference thicknesses are recorded.
variable hold_auto   index 1

# ----- Phase 1.25: piston approach to gel contact (records the Rg reference L0) -----
# The generator suspends the gel ~10-12 sigma ABOVE the support.  There is NO
# body-force pre-seating: the applied piston PRESSURE (Phase 2) pushes the gel
# down onto the support itself, and the AUTHORITATIVE strain is Rg-based
# (eps = (L0 - gel_lz_rg)/L0), which is immune to that rigid translation -- so a
# separate seating step would only cost wall time.  We only bring the piston to
# first CONTACT under velocity control (piston-solvent WCA is OFF, so a piston
# released under load from its parked height would free-fall and slam the gel),
# then record L0 = gel_lz_rg (the equilibrium-swollen reference thickness).
variable seat_gamma   equal 1.0      # viscous damping on the force-controlled piston (damps its settle)
variable contact_gap  equal 1.12     # each plate stops this many sigma short of the OUTERMOST gel bead at seating.
                                     # 2026-09-05: raised 0.9 -> 1.12 (= the WCA cutoff 1.122) so the plates arrive
                                     # just OUTSIDE the repulsive range of the extreme beads and the seated gel carries
                                     # NO squeeze.  At 0.9 the outermost beads sat 0.2 sigma inside the WCA range, the
                                     # gel was pre-compressed ~0.4 sigma in total, and the epsilon=0 reference (recorded
                                     # only 50k steps later, i.e. still UNDRAINED) read sigma'_zz ~ +0.009 and
                                     # sigma'_xx,yy ~ +0.02 instead of ~0.  Thermal motion still brings surface beads
                                     # into gentle contact, so the plates are seated, not floating.  Do NOT drop much
                                     # below ~0.85 or the r^-12 repulsion on the outermost bead spikes and shocks the gel.
variable nsteps_seat  equal 500000   # safety cap for the piston-approach run

# ----- Phase 1.5: pre-compression REFERENCE averaging window -----
# After Phase 0.5 the gel is equilibrated at P_target.  Hold the piston at v=0
# and average ALL observables over this window to define the ε=0 reference
# state.  ref_nfreq sets how often a reference snapshot is emitted; several
# snapshots over ref_avg_steps let the notebook form confidence intervals on
# the reference profiles.  The window is padded to end on a ref_nfreq epoch
# boundary (chunk/atom lock requirement — see Phase 1.5 block).
variable ref_avg_steps index 150000     # total pre-compression reference window (index: -var override for smoke tests)
variable ref_nevery    equal 100         # sample cadence within a ref snapshot
variable ref_nfreq     index 10000        # one ref snapshot every ref_nfreq steps (index: -var override)
variable ref_nrepeat   equal v_ref_nfreq/v_ref_nevery   # = 100 samples / snapshot
#   → 150000/10000 = 15 reference snapshots, each averaging 100 decorrelated samples

# ----- Solvent mass density -----
# Solvent bead mass for converting number density → mass density in the notebook
# (LAMMPS density/mass uses the masses in the data file directly; this is a
# bookkeeping value for the analysis only).
variable solvent_mass  equal 1.0

# ----- Output Frequencies -----
variable thermo_freq     equal 250000 # 2000  # 250000

# ----- Trajectory dump frame budget (single knob, like num_stress_curves) -----
# num_dump_frames sets ~how many all-atom frames EACH movie gets: gel_setup
# (setup: equilibration -> seating -> settle -> reference -> first drive) and
# gel_flow (production HOLD).  Each cadence is derived as (phase length /
# num_dump_frames), exactly the way the stress nfreq is derived from
# nsteps / num_stress_curves.  Retune sampling with THIS ONE variable.
variable num_dump_frames equal 30
# gel_flow spans the HOLD (nsteps) -> ~num_dump_frames frames over the hold.
variable dump_freq_prod  equal floor(${nsteps}/v_num_dump_frames)
# The piston DRIVE (first level) gets its own FINER cadence -- ~num_drive_frames
# EXTRA frames over the short, dynamic drive (the uniform setup cadence is too
# coarse there).  Derived from the estimated drive length in the sweep loop.
variable num_drive_frames equal 5
# gel_setup cadence (dump_freq_setup) is derived just before that dump opens in
# Phase 0, once npt_p05_steps / t_seat / nsteps_settle / ref_avg_steps are all
# defined -- see "setup-movie cadence" below.
variable volume_freq     equal 5000 # 1000 # 5000

# Finer cadence for the STRAIN / POSITION diagnostics (strain_zz, piston &
# polymer positions, gel dimensions).  These are tiny per-line prints, so a
# high rate is cheap and resolves the piston-motion (loading) phase —
# especially useful for tracking how the measured strain rises under load and
# for the strain-diagnostic plot in triaxial_compression.ipynb.
variable strain_freq     equal 1000

# Cavity Widom dump cadence — all-atom frames for cavity_widom.py post-processing.
# More frames → lower noise in time-averaged μ_ex(z): noise ∝ 1/√num_widom_frames.
# Dump starts after the ε=0 reference recording block (production phase only).
# GATED OFF by default (feature archived 2026-08; cavity_widom.py lives in
# lammps_work/archive/): skip_widom=1 skips the widom_traj dumps. run_lammps.sh
# passes -var skip_widom from $SKIP_WIDOM (its default is also 1); the index
# default below only applies when the engine is invoked directly. The solvent
# density profiles in output_files/chemical_potential/ are NOT gated — the
# production notebooks still read them.
variable skip_widom index 1
variable num_widom_frames equal 50
variable nfreq_widom_dump equal floor(${nsteps}/v_num_widom_frames)

# ======================================================================

# ----- Time Averaging (stress) -----
# nfreq = nevery * nrepeat  (LAMMPS constraint)
variable num_stress_curves equal 20    # stress/density/displacement frames per hold (10 -> 20 on
                                       # 2026-09-03 for the sigma'_zz/sigma'_ii-vs-step plot; the
                                       # notebooks still DRAW 10 evolution curves, n_curves)
variable nevery_target     equal 100   # ~0.5 tau — near stress decorrelation time
variable nrepeat_max       equal 2000  # cap to preserve transient resolution
variable nrepeat_min       equal 50    # floor for adequate noise reduction

variable nfreq_raw    equal floor(${nsteps}/v_num_stress_curves)
variable nrepeat_raw  equal floor(v_nfreq_raw/v_nevery_target)

# Clamp nrepeat to [min, max]
variable nr_lo equal (v_nrepeat_raw>v_nrepeat_min)*v_nrepeat_raw+(v_nrepeat_raw<=v_nrepeat_min)*v_nrepeat_min
variable nrepeat_stress equal (v_nr_lo<v_nrepeat_max)*v_nr_lo+(v_nr_lo>=v_nrepeat_max)*v_nrepeat_max

# Derive nevery and enforce exact constraint
variable nevery_stress equal floor(v_nfreq_raw/v_nrepeat_stress)
variable nfreq_stress  equal v_nevery_stress*v_nrepeat_stress

# NOTE: these globals are only the BASELINE (sized on ${nsteps}).  With
# hold_auto=1 the sweep loop RE-DERIVES nfreq_raw/nrepeat/nevery/nfreq_stress,
# dump_freq_prod and nfreq_widom_dump from each level's own auto-sized hold, so
# every level still gets ~num_stress_curves stress frames and ~num_dump_frames
# movie frames however long its hold turns out to be (output volume per level
# stays put instead of growing with the hold).  Nothing between here and the
# sweep loop uses them -- the epsilon=0 reference window has its own ref_* cadence.
print ">>> Stress (baseline from nsteps): nevery=${nevery_stress} nrepeat=${nrepeat_stress} nfreq=${nfreq_stress}"
print ">>> Mode: COMPRESSION (piston-loaded gel)"

# ----- Spatial Binning -----
variable binWidth    equal 2.0
variable rg_scale    equal 1.8   # Rg multiplier (~90% coverage for Gaussian)
variable region_frac equal 1     # fraction of polymer extent for analysis regions

# ----- Dual-resolution z-binning (fine bins near support + piston) -----
# Coarse global profiles use binWidth.  In addition, finer bins of width
# binWidth_fine are written within a half-window fine_halfwin of the support
# top and of the piston, where the stress gradients are sharpest.  The notebook
# stitches the coarse and fine profiles.  The fine regions track the support
# COM and piston COM dynamically so they follow the piston as the gel compresses.
variable binWidth_fine equal 0.5    # fine bin width (σ) near support/piston
variable fine_halfwin  equal 6.0    # half-height of each fine window (σ)


# ==========================================================================
#                           INITIALIZATION
# ==========================================================================

units lj
dimension 3
boundary p p p
atom_style molecular
atom_modify map array

# Single lj/cut pair style.
# NOTE: sub-style virial filtering ("compute stress/atom NULL pair <style>")
# is not supported by this LAMMPS build — the "pair" keyword in compute
# stress/atom includes ALL pair interactions and takes no further arguments.
# The hybrid pair_style approach (using lj/expand for 3-3 to get a unique
# style name) was attempted but also rejected.  The solvent-solvent-only
# stress decomposition is therefore omitted; see the poroelasticity notes
# in compression_analysis.ipynb for the post-processing correction.
#
# rc = 1.122 ~= 2^(1/6) is the LJ MINIMUM, and `pair_modify shift` is NOT set, so
# the tabulated energy jumps by -epsilon at the cutoff while the force goes
# continuously to zero.  MD never sees that discontinuity, so the Hamiltonian the
# trajectory actually samples is WCA, u(r) = 4[(1/r)^12-(1/r)^6] + 1.  Irrelevant
# to every stress/virial output here (those depend only on du/dr, which is
# identical either way), but it matters for any ENERGY-based post-processing:
# a Widom/chemical-potential calculation must use the SHIFTED (WCA) form, or it
# picks up a spurious -epsilon*(coordination number) in mu_ex.
pair_style lj/cut 1.122
bond_style fene

read_data data_files/${dataname}.data nocoeff

comm_modify cutoff 5.0

print "========================================"
print "Triaxial compression simulation: ${dataname}"
print "Interaction: epsSS=${epsSS}, epsSP=${epsSP}"
print "Production steps: ${nsteps}"
print "Seating piston-approach velocity: ${v_piston_prod} sigma/tau (production is stress-controlled)"
print "========================================"


# ==========================================================================
#                          GROUP DEFINITIONS
# ==========================================================================

group polymer   type 1 2
group solvent   type 3
group support   type 4
group piston    type 5
group mobile    type 1 2 3
group gel_system type 1 2 3 4 5


# ==========================================================================
#                       INTERATOMIC POTENTIALS
# ==========================================================================

# Default: full LJ for all pairs
pair_coeff * * 1.0 ${sigma} 1.122

# Polymer-solvent (tunable)
pair_coeff 1 3 ${epsSP} ${sigma} 1.122    # polymer-solvent
pair_coeff 2 3 ${epsSP} ${sigma} 1.122    # crosslinker-solvent

# Solvent-solvent (tunable)
pair_coeff 3 3 ${epsSS} ${sigma} 1.122    # solvent-solvent

# Polymer/crosslinker with support and piston (WCA repulsive)
pair_coeff 1 4 1.0 ${sigma} 1.122
pair_coeff 2 4 1.0 ${sigma} 1.122
pair_coeff 1 5 1.0 ${sigma} 1.122
pair_coeff 2 5 1.0 ${sigma} 1.122

# Solvent-piston: OFF for compression — piston passes through solvent freely,
# loads gel directly.
pair_coeff 3 5 0.0 ${sigma} 0.0          # OFF (compression)
# 2026-09-07: the INPUT slab (..._14000002.data) is now also equilibrated with this
# pair OFF (slab_with_support.batch exports PISTON_TRANSPARENT=1).  With the sheet
# visible to solvent its ~2.8 eps/sigma^2 wall tension was absorbed by the gel under
# the aniso barostat (sig_p,xx/zz = 1.0185); with it off the slab arrives isotropic,
# so Phase 0 below re-equilibrates a state that was made under identical potentials.
# Turn 3-5 back on only in triaxial_permeation.lmp (slow push-in, constant volume).

# Non-interacting pairs
pair_coeff 3 4 0.0 ${sigma} 0.0   # solvent-support
pair_coeff 4 4 0.0 ${sigma} 0.0   # support-support
pair_coeff 4 5 0.0 ${sigma} 0.0   # support-piston
pair_coeff 5 5 0.0 ${sigma} 0.0   # piston-piston

# ----- Bonds and Angles -----
bond_coeff * 30.0 1.5 1.0 1.0
special_bonds fene

# Angle style — hybrid (uncomment if angles are present in data file)
#angle_style hybrid cosine harmonic
#angle_coeff 1 cosine 1.0
#angle_coeff 2 harmonic 40.0 109.47

# ----- Neighbor List Exclusions -----
neigh_modify exclude type 4 4   # support-support
neigh_modify exclude type 5 5   # piston-piston
neigh_modify exclude type 4 5   # support-piston


# ==========================================================================
#                           RIGID BODIES
# ==========================================================================

# Support: completely frozen
velocity support set 0.0 0.0 0.0
fix rigid_support support rigid single force * off off off torque * off off off

# Piston: rigid + frozen (force * off off off + setforce 0) through the Phase 0
#   NPT equilibration, the contact approach, and the epsilon=0 reference.  It is
#   released to constant-PRESSURE force control (setforce 0 0 NULL + nve +
#   viscous + aveforce load) just before the pressure sweep.
velocity piston set 0.0 0.0 0.0

fix rigid_piston piston rigid single force * off off off torque * off off off
fix freeze_piston piston setforce 0.0 0.0 0.0


# ==========================================================================
#                           THERMO OUTPUT
# ==========================================================================

compute mobile_temp mobile temp
compute mobile_press all pressure thermo_temp pair bond
thermo_style custom step c_mobile_temp pe ke etotal press c_mobile_press vol lx ly lz
thermo_modify lost warn
thermo ${thermo_freq}

# ----- Piston force compute -----
# c_piston_fz: sum of pairwise z-forces on ALL piston atoms = the gel/solvent
#   reaction on the piston.  Positive = net upward (gel pushing piston up).
#   While the piston is rigid+frozen (setforce 0) it reads ~0; once it is under
#   force control during the sweep it reads the gel reaction, which balances the
#   applied load at equilibrium (a consistency check on the prescribed pressure).
#   The piston-force fix print is only defined inside the sweep loop.
compute piston_fz      piston reduce sum fz
variable piston_area      equal lx*ly          # cross-sectional area of simulation box
variable piston_pressure_z equal c_piston_fz/v_piston_area  # force normalised by area

# ----- Block-averaged piston force (noise reduction for P(t) and M_piston) -----
# c_piston_fz is the INSTANTANEOUS pairwise contact force on the piston -> it
# carries the full thermal fluctuation (that is the scatter seen in P(t)).
# The only piston damping is the light viscous settle fix, so noise is reduced
# the correct way -- by time-averaging.  fix out_piston_force_avg (see PRODUCTION
# stress block) block-
# averages c_piston_fz over each volume_freq window, cutting the scatter by
# ~sqrt(pf_nrepeat) while keeping the same output cadence as the raw file.
# c_piston_fz is a GLOBAL reduce (not chunk/atom), so there is no ave/time lock
# issue and the fix can span the compression + relaxation runs freely.
variable pf_nevery  equal 50                        # sample every 50 steps (~0.25 tau)
variable pf_nrepeat equal floor(${volume_freq}/v_pf_nevery)   # samples per window
variable pf_nfreq   equal v_pf_nevery*v_pf_nrepeat   # = volume_freq (exact multiple)


# ==========================================================================
#              PHASE 0: NVT EQUILIBRATION (BOTH MODES)
# ==========================================================================
# Equilibrate at the current box volume.  No pressure adjustment here —
# Phase 0.5 (z-only NPH) re-pressurises the box to P_target, then Phase 2
# applies the piston.  Box dimensions stay fixed throughout Phase 0.

print "========================================"
print "Phase 0: NPT equilibration (preserve equilibrium swelling at P_target)"
print "========================================"
# The input configuration is ALREADY equilibrated at P_target by the
# slab_with_support workflow (~1.4M steps of aniso NPT).  So there is NO
# fixed-volume pre-phase here: a fixed-volume NVT would bleed the pressure off
# (the thermostat cools T, dropping the kinetic term) and force a large box
# shrink to recover P_target — squeezing the gel from both z-ends before any
# compression.  Instead we go STRAIGHT to a pressure-controlled (NPT-equivalent)
# equilibration: Langevin thermostat + z-only NPH barostat at Pzz=P_target.
# Because the box already sits at P_target the cell barely moves, so the gel
# keeps its equilibrium swollen thickness.
#
# z-only barostat: ONLY the z box dimension is barostatted (to Pzz=P_target); x,y
#   stay fixed at their equilibrium periodic extents.  Transverse (xx,yy) stresses
#   that arise in the polymer during compression thus never perturb the barostat,
#   so the solvent reservoir stays pinned at the target Pzz.  Target is the zz
#   component of the stress tensor, NOT the full scalar `Press`.
# Langevin+NPH (not fix npt / Nose-Hoover): FENE bonds inject KE faster than a
#   Nose-Hoover chain removes it (T can stick at ~6); Langevin's per-atom
#   friction always wins.
# Piston + support are temporarily on nve+setforce so they scale with the box
#   (dilate all remaps them) without injecting rigid-constraint virial into the
#   barostat, then are restored to rigid+frozen.  The box is frozen for every
#   phase after this one; the piston alone drives z-compression later.
# npt_P_damp:    barostat damping (tau); increase (200-1000) if FENE warnings / box oscillates.
# npt_p05_steps: equilibration length; increase if Press has not converged.

variable npt_P_damp    equal 50.0    # barostat damping (tau); increase if FENE errors appear
variable npt_p05_steps index 2000000 # equilibration length (index: -var override for smoke tests).  2026-09-05: 120k -> 2M (~ tau_1, the gel's
                                     # poroelastic volume-relaxation time).  The input data file sits at
                                     # T ~ 1.24 (the generator's Nose-Hoover NPT does not hold T = 1), so this
                                     # phase cools it to T = 1 AND lets the barostat shrink the box (~0.8% in
                                     # x,y, ~5% in z for the rho04 slab) while the gel deswells ~5% in volume.
                                     # At 120k the box was still moving when frozen, leaving p_res = 1.4885
                                     # (< P_target) and sigma'_xx,yy ~ +0.02 in the reference.  Verify with the
                                     # convergence figure (box + gel volume flat over the last ~1/3 of Phase 0)
                                     # and the 10k-step thermo below before trusting a run.
variable npt_P05_target equal ${P_target}   # aniso barostat targets the full scalar pressure (x,y,z independently)

reset_timestep 0
timestep ${timestep_prod}

# ==========================================================================
#   GEL / BOX TRACKING COMPUTES + WHOLE-RUN CONVERGENCE LOGGERS
#   (moved ABOVE Phase 0 on 2026-09-05 so the equilibration itself is tracked)
# ==========================================================================
# WHY HERE: the 2026-09-05 analysis of the setup trajectory showed Phase 0 still
# moving when the box was frozen (lx, ly rising ~0.1 sigma and lz falling ~0.6 sigma
# per 15k steps at step 120k) and the gel losing ~5% of its volume during it --
# the input data file is at T ~ 1.24 (its Nose-Hoover NPT never held T = 1), so
# cooling to T = 1 drops the pressure and the barostat has to compress the box.
# These loggers now start at step 0 so plot_lammps_log.py's convergence figure
# shows Phase 0 itself: box volume, BB and Rg gel volume must be FLAT for the
# last ~1/3 of Phase 0 before the box is frozen.  If they are not, raise
# npt_p05_steps.
#
# STEM-suffixed (NO _c<level> tag) to MATCH the filenames plot_lammps_log.py
# reads (box_dimensions / gel_volume_bb / gel_volume_rg / gel_dimensions_rg with
# the run stem = dataname_interaction_nsteps).  The per-level _c<level> loggers
# inside the sweep loop are kept as-is for the notebook.  All are GLOBAL scalars
# (no chunk/atom compute) -> no ave/time lock, so one fix spans every run command
# unbroken (fix print is silent during the minimize); unfixed at the very end.
#
# Formats match the readers in plot_lammps_log.py:
#   box_dimensions / gel_dimensions_rg : "step lx ly lz"  (read_fix_print)
#   gel_volume_rg                      : "step vol"        (read_timestep_volume_file)
#   gel_volume_bb                      : "vol"             (read_volume_file -> column 0)
compute polymer_com polymer com

# ----- Bounding Box (BB) — gel dimensions from min/max coordinates -----
# Sensitive to outlier beads; kept for diagnostics and gel dimension output.
compute minx polymer reduce min x
compute maxx polymer reduce max x
compute miny polymer reduce min y
compute maxy polymer reduce max y
compute minz polymer reduce min z
compute maxz polymer reduce max z

variable gel_lx_bb equal c_maxx-c_minx
variable gel_ly_bb equal c_maxy-c_miny
variable gel_lz_bb equal c_maxz-c_minz
variable gel_vol_bb equal v_gel_lx_bb*v_gel_ly_bb*v_gel_lz_bb

# ----- Radius of Gyration (Rg) — robust gel dimensions -----
# For a uniform rectangular prism: Rg_ii² = L_i²/12  →  L_i = 2√3·√(Rg_ii²)
# c_rg_tensor[i] returns Rg_ii² (diagonal component of gyration tensor).
compute rg_tensor polymer gyration

variable gel_lx_rg equal 2.0*sqrt(3.0*c_rg_tensor[1])
variable gel_ly_rg equal 2.0*sqrt(3.0*c_rg_tensor[2])
variable gel_lz_rg equal 2.0*sqrt(3.0*c_rg_tensor[3])
variable gel_vol_rg equal v_gel_lx_rg*v_gel_ly_rg*v_gel_lz_rg

# ----- Box dimensions -----
variable box_lx equal lx
variable box_ly equal ly
variable box_lz equal lz

fix trk_box all print ${strain_freq} "$(step) $(v_box_lx) $(v_box_ly) $(v_box_lz)" &
    file output_files/volume_data/box_dimensions_${dataname}_${interaction}_${nsteps}.dat screen no
fix trk_dims_rg all print ${strain_freq} "$(step) $(v_gel_lx_rg) $(v_gel_ly_rg) $(v_gel_lz_rg)" &
    file output_files/volume_data/gel_dimensions_rg_${dataname}_${interaction}_${nsteps}.dat screen no
fix trk_vol_rg all print ${strain_freq} "$(step) $(v_gel_vol_rg)" &
    file output_files/volume_data/gel_volume_rg_${dataname}_${interaction}_${nsteps}.dat screen no
fix trk_vol_bb all print ${strain_freq} "$(v_gel_vol_bb)" &
    file output_files/volume_data/gel_volume_bb_${dataname}_${interaction}_${nsteps}.dat screen no

# ----- cont=1: skip equilibration (data file already holds the equilibrated state) -----
# Jump BEFORE opening traj_setup so a continuation does not open the setup movie
# (the sweep-loop teardown guards on cont=0 to undump it).
if "${cont} == 1" then "jump SELF label_after_phase05"

# ----- Symmetric-seating / settle lengths (also feed the setup-movie cadence) --
variable t_seat        index 143000   # seating: common approach time (steps; index: -var override), v=d/t; raised from 100000 so the seating approach velocity drops ~30% (v∝1/t_seat) -> gentler contact, less bounce on convergence
variable nsteps_settle index 1000000  # both-plates-fixed settle before the ε=0 reference (index: -var override).  2026-09-05: 50k -> 1M.
                                      # The 50k settle recorded the reference while the gel was still relaxing
                                      # (mostly the unfinished Phase 0, see npt_p05_steps).  With Phase 0 now 2M
                                      # steps and contact_gap >= 1.12 (plates stop at the edge of the WCA range,
                                      # so seating imposes no compression and there is no consolidation transient
                                      # to wait out), 1M (~tau_1/2) is enough for the gel to come to rest against
                                      # the just-seated plates.  Raise to ~2M if the reference piston preload
                                      # (piston_force_avg_ref) is still drifting over the reference window.

# ----- setup-movie cadence: ~num_dump_frames over the pre-production phases -----
# gel_setup spans equilibration + seating + settle + reference (+ the short first
# drive).  Derive its cadence from that span / num_dump_frames so it gets ~the
# same frame count as gel_flow, with no hand-tuning.  (The first drive adds a few
# extra frames at the same cadence — total stays ~num_dump_frames.)
variable setup_span      equal v_npt_p05_steps+v_t_seat+v_nsteps_settle+v_ref_avg_steps
variable dump_freq_setup equal floor(v_setup_span/v_num_dump_frames)
print ">>> gel_setup dump: ~${num_dump_frames} frames over setup span $(v_setup_span:%.0f) steps -> every ${dump_freq_setup} steps"

# Whole-setup trajectory (gel_setup): opens here and stays open through the
# equilibration, the symmetric seating, the settle, and the epsilon=0 reference,
# then continues into the first level's drive at a FINER cadence (num_drive_frames)
# and closes when that drive ends (see sweep loop).  One continuous setup movie.
dump traj_setup gel_system custom ${dump_freq_setup} &
   traj_files/gel_setup_${dataname}_${interaction}_${nsteps}.lammpstrj &
   id type mol x y z

# Brief minimize to clean up any residual overlaps from the data-file build
variable min_iter index 1000            # minimize iterations (index: -var override for smoke tests)
minimize 1.0e-4 1.0e-6 ${min_iter} 10000

print '========================================'
print 'Phase 0: Langevin+NPH ANISO equilibration -> P target=${npt_P05_target} (x,y,z each)'
print '========================================'

# Release piston + support so they scale with the box (nve+setforce, no fix rigid)
unfix freeze_piston
unfix rigid_piston
fix nve_piston      piston nve
fix setforce_piston piston setforce 0.0 0.0 0.0
unfix rigid_support
fix freeze_support support setforce 0.0 0.0 0.0
fix nve_support    support nve

fix lang_p05 mobile langevin ${temp_target} ${temp_target} 1.0 48279
# ANISO barostat: x, y, and z box dims each relax independently to P_target.
# The laterally-periodic slab is free to find its equilibrium x,y extents as well
# as z, so the gel reaches its true stress-free swollen state before seating.
# (Reverted from the z-only barostat: with both plates seated symmetrically the
# transverse stresses are set by the equilibrium box, not pinned by hand.)
fix nph_p05  mobile nph aniso ${npt_P05_target} ${npt_P05_target} ${npt_P_damp}
# Dense thermo during Phase 0 (2026-09-05): thermo_freq = 250k printed only step 0
# of the old 120k-step equilibration, so its convergence could not be read from
# the log at all.  T, Press, lx, ly, lz every 10k steps -> ~200 lines over 2M.
thermo 10000
run ${npt_p05_steps}
thermo ${thermo_freq}
unfix lang_p05
unfix nph_p05

print '>>> Post-NPT equilibration: T=$(c_mobile_temp)  Press=$(press)  mobile_press=$(c_mobile_press)  lx=$(lx) ly=$(ly) lz=$(lz)'

# Restore rigid, frozen piston + support at their new (scaled) positions
unfix nve_piston
unfix setforce_piston
velocity piston set 0.0 0.0 0.0
fix rigid_piston piston rigid single force * off off off torque * off off off
fix freeze_piston piston setforce 0.0 0.0 0.0
unfix freeze_support
unfix nve_support
velocity support set 0.0 0.0 0.0
fix rigid_support support rigid single force * off off off torque * off off off

label label_after_phase05

# run 0 initializes all thermo computes so their values can be referenced in the
# print statements and variable formulas below (required for cont=1, which jumps
# here and skips the equilibration run that would otherwise serve this purpose).
run 0

print '>>> Post-equilibration: T=$(c_mobile_temp)  Press=$(press)  mobile_press=$(c_mobile_press)  lz=$(lz)'

print ">>> Pre-production: T=$(c_mobile_temp)  mobile_press=$(c_mobile_press)"
# gel_setup (traj_setup) is intentionally LEFT OPEN here.  It runs continuously
# through the NPT equilibration, the piston contact approach, the ε=0 reference,
# and into the first level's loading — one movie of the whole setup — and is
# undumped when that loading ends (see the sweep loop).  (cont=0 only: for cont=1
# Phase 0 never ran, so traj_setup does not exist; the loop guards this.)


# ==========================================================================
#                    ANALYSIS: POLYMER TRACKING
# ==========================================================================
# The polymer COM, bounding-box and gyration computes (polymer_com, minx..maxz,
# rg_tensor) and the gel_l*_bb / gel_l*_rg / gel_vol_* / box_l* variables are
# defined ABOVE Phase 0 (GEL / BOX TRACKING block) since 2026-09-05 so that the
# equilibration is tracked too; everything below builds on them.

# Robust gel-top estimate: polymer COM_z + half the Rg-based z-thickness.
# c_maxz (raw maximum) is polluted by stray crosslinker/polymer beads that
# diffuse into the solvent.  The Rg-based estimate is unaffected because
# COM and Rg² are mean/variance over ~96k atoms — one outlier < 0.004%.
variable gel_top_rg equal c_polymer_com[3]+0.5*v_gel_lz_rg

# ----- Piston position/velocity computes -----
# Defined here (before run 0) so they are initialized alongside polymer/rg computes.
# Used by the piston output fixes and by the contact-gap / strain diagnostics.
compute piston_com piston com          # PBC-aware COM; use [3] for z
compute piston_vz piston reduce ave vz  # velocities do not wrap

# Support COM (z) — used to centre the fine-resolution z-binning window on the
# support so the high-resolution profile follows the support if it ever moves.
compute support_com support com         # PBC-aware COM; use [3] for z

# ----- Gel bottom + piston/support gaps (for Phase 1.25 seating & boundary strain) -----
# gel_bot_gap > 0 while the gel floats above the support; -> ~0 once seated.
# piston_gel_gap: piston COM above gel top (contact detector).
# piston_support_gap: confined-column height proxy (COM-to-COM; thin sheets so
#   the constant sheet-thickness offset cancels in the strain ratio).
variable gel_bot_rg         equal c_polymer_com[3]-0.5*v_gel_lz_rg
variable gel_bot_gap        equal v_gel_bot_rg-c_support_com[3]
variable piston_gel_gap     equal c_piston_com[3]-v_gel_top_rg
variable piston_support_gap equal c_piston_com[3]-c_support_com[3]

# ----- Polymer z-displacement reference -----
# Defined here so run 0 below captures the post-Phase-0.5 equilibrated positions
# as the reference configuration.  This gives u_z(z, 0) = 0 at Phase 2 start
# by construction.  c_displace_poly[3] is the PBC-aware z-displacement per atom.
compute displace_poly polymer displace/atom

run 0   # initializes ALL computes in one pass; sets displace_poly reference

# ----- Snapshot Rg tensor for diagnostics and analysis region sizing -----
variable Rg_xx equal c_rg_tensor[1]
variable Rg_yy equal c_rg_tensor[2]
variable Rg_zz equal c_rg_tensor[3]

print "Rg_xx = ${Rg_xx}  →  Lx_rg = $(v_gel_lx_rg)"
print "Rg_yy = ${Rg_yy}  →  Ly_rg = $(v_gel_ly_rg)"
print "Rg_zz = ${Rg_zz}  →  Lz_rg = $(v_gel_lz_rg)"
print "BB:  Lx=$(v_gel_lx_bb) Ly=$(v_gel_ly_bb) Lz=$(v_gel_lz_bb)"

# Analysis region half-widths (use rg_scale for ~90% coverage)
variable eps equal 1.0e-12
variable hw_x equal v_region_frac*v_rg_scale*sqrt(v_Rg_xx + v_eps)
variable hw_y equal v_region_frac*v_rg_scale*sqrt(v_Rg_yy + v_eps)
variable hw_z equal v_region_frac*v_rg_scale*sqrt(v_Rg_zz + v_eps)

print "hw_x = ${hw_x}"
print "hw_y = ${hw_y}"
print "hw_z = ${hw_z}"

# ----- Gel strain (Rg-based) -----
# $(v_gel_lz_rg) — parentheses force immediate numeric evaluation right now,
# storing a constant. ${gel_lz_rg} would store the expression string instead.
variable gel_lz_initial equal $(v_gel_lz_rg)
print ">>> Initial gel thickness (Rg): L0 = ${gel_lz_initial}"
print ">>> Initial gel thickness (BB): L0 = $(v_gel_lz_bb)"
print ">>> Gel top (Rg-based) = $(v_gel_top_rg)   c_maxz (raw) = $(c_maxz)   Piston z = $(c_piston_com[3])   Gap = $(c_piston_com[3]-v_gel_top_rg)"

variable gel_strain equal (v_gel_lz_initial - v_gel_lz_rg) / v_gel_lz_initial


# ==========================================================================
#   WHOLE-RUN CONVERGENCE TRACKING (BB + Rg gel size, box size)
# ==========================================================================
# These span EVERY phase — Phase 0, the piston contact approach, the ε=0
# reference window, and every sweep level's loading + hold — so the convergence
# figure from plot_lammps_log.py shows BB & Rg gel dimensions and box size
# across the ENTIRE multistep protocol.  The gel translating onto the support and
# then compressing under load therefore appear as inspectable stages.
#
# STEM-suffixed (NO _c<level> tag) to MATCH the filenames plot_lammps_log.py
# reads (box_dimensions / gel_volume_bb / gel_volume_rg / gel_dimensions_rg
# with the run stem = dataname_interaction_nsteps).  The per-level _c<level>
# loggers inside the sweep loop are kept as-is for the notebook; these are
# additional and independent.  All are GLOBAL scalars (no chunk/atom compute)
# → no ave/time lock, so one fix spans every run command unbroken; they are
# unfixed at the very end (before write_data).
#
# Formats match the readers in plot_lammps_log.py:
#   box_dimensions / gel_dimensions_rg : "step lx ly lz"  (read_fix_print)
#   gel_volume_rg                      : "step vol"        (read_timestep_volume_file)
#   gel_volume_bb                      : "vol"             (read_volume_file → column 0)
# 2026-09-05: the four trk_* fixes (trk_box, trk_dims_rg, trk_vol_rg, trk_vol_bb)
# now live in the GEL / BOX TRACKING block ABOVE Phase 0, so the files start at
# step 0 and include the equilibration.  They are still unfixed at the very end.


# ==========================================================================
#              PHASE 2: PRODUCTION — piston forcing
# ==========================================================================

print "========================================"
print "Phase 2: Production — piston forcing"
print "========================================"

# ----- Ready the piston + support for the SYMMETRIC CONTACT approach -----
# Both plates are moved toward the gel in Phase 1.25 at prescribed velocities
# (v = d/t, common time t, distances d from the BB gel top/bottom).  Both stay
# rigid with all forces off so they translate ballistically at the set velocity
# (no force-driven acceleration from the gel).  PRODUCTION loading is
# VELOCITY-controlled and SYMMETRIC: the piston (down) and the support (up) are
# driven together until the plate gap has closed by strain*L0_bb (drive_split sets
# each plate's share), then BOTH are FROZEN for the measurement hold.
#
# cont=1: plates stay rigid+frozen (approach/L0 skipped); a continuation is only
#   meaningful as a single-state relaxation and is unsupported for a sweep.
if "${cont} == 1" then "jump SELF label_skip_comp_piston_setup"
unfix freeze_piston
unfix rigid_piston
fix rigid_piston piston rigid single force * off off off torque * off off off
# support: already rigid (force * off); re-assert here so both are drive-ready
unfix rigid_support
fix rigid_support support rigid single force * off off off torque * off off off
label label_skip_comp_piston_setup

# ----- Thermostat: FULL 3-D Nose-Hoover on the mobile atoms (2026-09-05) -----
# Was `compute myTemp mobile temp/partial 1 1 0` + `fix_modify nvt_prod temp myTemp`
# (x,y only), a leftover from the flow mode where z was the streaming direction.
# Nothing streams in compression, and the x,y-only thermostat left the z kinetic
# term of every stress profile to equipartition alone.  This is the A/B test for
# the constant ~0.002 (stress units) shortfall of the profile-based sigma'_zz
# against the piston F_z/A seen at EVERY strain level 0.05-0.40 (2026-09-05
# analysis): if the shortfall moves with this change, the kinetic term is the
# culprit; if not, it is in the virial or the force balance.
fix nvt_prod mobile nvt temp ${temp_target} ${temp_target} 1.0


# ==========================================================================
#                    ANALYSIS: DYNAMIC REGIONS
# ==========================================================================

# Region for X-direction binning: restricted in Y-Z, full extent in X
variable reg_x_ylo equal c_polymer_com[2]-v_hw_y
variable reg_x_yhi equal c_polymer_com[2]+v_hw_y
variable reg_x_zlo equal c_polymer_com[3]-v_hw_z
variable reg_x_zhi equal c_polymer_com[3]+v_hw_z
region reg_x block EDGE EDGE v_reg_x_ylo v_reg_x_yhi v_reg_x_zlo v_reg_x_zhi side in

# Region for Y-direction binning: restricted in X-Z, full extent in Y
variable reg_y_xlo equal c_polymer_com[1]-v_hw_x
variable reg_y_xhi equal c_polymer_com[1]+v_hw_x
variable reg_y_zlo equal c_polymer_com[3]-v_hw_z
variable reg_y_zhi equal c_polymer_com[3]+v_hw_z
region reg_y block v_reg_y_xlo v_reg_y_xhi EDGE EDGE v_reg_y_zlo v_reg_y_zhi side in

# NOTE: Z-direction binning uses the full simulation box (no region restriction).
# This keeps the piston and support at their true z-locations in the profile.
# X and Y profiles retain the polymer-COM-tracked lateral restriction above.


# ==========================================================================
#                    ANALYSIS: CHUNK DEFINITIONS
# ==========================================================================

# 1D binning with dynamic rectangular regions (x, y — single user each, no conflict)
compute chunk_x_polymer polymer chunk/atom bin/1d x lower ${binWidth} region reg_x
compute chunk_y_polymer polymer chunk/atom bin/1d y lower ${binWidth} region reg_y
compute chunk_x_solvent solvent chunk/atom bin/1d x lower ${binWidth} region reg_x
compute chunk_y_solvent solvent chunk/atom bin/1d y lower ${binWidth} region reg_y

# Z profiles — one chunk/atom per reduce/chunk user.
# LAMMPS 22Jul2025 rejects multiple fix ave/time sharing the same chunk/atom
# via different reduce/chunk computes ("Two fix commands using same compute
# chunk/atom command in incompatible ways").  Each compute reduce/chunk must
# therefore reference a unique chunk/atom ID.
#
#   chunk_z_poly_p   → press_z_polymer  (isotropic z-press, polymer)
#   chunk_z_poly_zz  → sigmazz_poly
#   chunk_z_poly_xx  → sigmaxx_poly
#   chunk_z_poly_yy  → sigmayy_poly
#   chunk_z_polymer  → fix avg_disp_z_poly (displacement, relaxation phase only)
#   chunk_z_solv_p   → press_z_solvent  (isotropic z-press, solvent)
#   chunk_z_solv_zz  → sigmazz_solv
#   chunk_z_solv_xx  → sigmaxx_solv
#   chunk_z_solv_yy  → sigmayy_solv
compute chunk_z_poly_p   polymer chunk/atom bin/1d z lower ${binWidth}
compute chunk_z_poly_zz  polymer chunk/atom bin/1d z lower ${binWidth}
compute chunk_z_poly_xx  polymer chunk/atom bin/1d z lower ${binWidth}
compute chunk_z_poly_yy  polymer chunk/atom bin/1d z lower ${binWidth}
compute chunk_z_polymer  polymer chunk/atom bin/1d z lower ${binWidth}

compute chunk_z_solv_p   solvent chunk/atom bin/1d z lower ${binWidth}
compute chunk_z_solv_zz  solvent chunk/atom bin/1d z lower ${binWidth}
compute chunk_z_solv_xx  solvent chunk/atom bin/1d z lower ${binWidth}
compute chunk_z_solv_yy  solvent chunk/atom bin/1d z lower ${binWidth}
# NON-VOLUME solvent zz virial needs its own unique chunk/atom (LAMMPS forbids
# two reduce/chunk fixes sharing one chunk/atom) -- see chunk_z_solv_vzz below.
compute chunk_z_solv_vzz solvent chunk/atom bin/1d z lower ${binWidth}

# Piston and support — single user each, no conflict
compute chunk_z_piston  piston  chunk/atom bin/1d z lower ${binWidth}
compute chunk_z_support support chunk/atom bin/1d z lower ${binWidth}


# ==========================================================================
#                    ANALYSIS: PARTIAL STRESSES
# ==========================================================================

# ── KINETIC TERM: what `stress/atom NULL` actually includes ───────────────
# NULL does NOT switch off the kinetic contribution.  Per the LAMMPS docs, NULL
# only means "no velocity-bias temperature compute -- use atom velocities as-is",
# and "if no extra keywords are listed, the kinetic contribution AND all of the
# virial contribution terms are included" (default: ke pair bond angle dihedral
# improper kspace fix).  So every profile derived from these two computes carries
# the ideal-gas term n(z)*kT.  To get virial only you must say so explicitly:
#     compute stress_solvent solvent stress/atom NULL virial
#
# Verified in the pure-solvent reservoir, where pair_coeff 3 4 / 3 5 are OFF so
# every solvent interaction is a 3-3 pair and the group value must exceed the
# ss pair virial (reconstructed from compute pair/local) by exactly n_s*kT:
#     group W/V_bin = 1.4872   ss pair virial/V_bin = 1.0136
#     difference    = 0.4737   n_s*kT               = 0.4680   (agrees to 1.2%)
# Inside the gel the same difference is n_s*kT + (1/2)*W_sp/V_bin, the extra part
# being half the solvent-polymer CROSS virial (stress/atom gives each atom half of
# every pair virial it takes part in).  The notebook adds the kinetic term to its
# pair/local sigma_s,ss and sigma_p,pp (ADD_KINETIC / KIN_T) so all its curves are
# comparable, and cross-checks that the leftover cross virial matches from both
# sides (~+0.26 in the gel core, ~0 in the reservoir).
compute stress_polymer polymer stress/atom NULL
compute stress_solvent solvent stress/atom NULL

# Partial stress for each atom: P = -(σxx + σyy + σzz)/(3*vol)
variable press_polymer_x atom -(c_stress_polymer[1]+c_stress_polymer[2]+c_stress_polymer[3])/(3.0*${binWidth}*ly*lz)
variable press_polymer_y atom -(c_stress_polymer[1]+c_stress_polymer[2]+c_stress_polymer[3])/(3.0*lx*${binWidth}*lz)
variable press_polymer_z atom -(c_stress_polymer[1]+c_stress_polymer[2]+c_stress_polymer[3])/(3.0*lx*ly*${binWidth})

variable press_solvent_x atom -(c_stress_solvent[1]+c_stress_solvent[2]+c_stress_solvent[3])/(3.0*${binWidth}*ly*lz)
variable press_solvent_y atom -(c_stress_solvent[1]+c_stress_solvent[2]+c_stress_solvent[3])/(3.0*lx*${binWidth}*lz)
variable press_solvent_z atom -(c_stress_solvent[1]+c_stress_solvent[2]+c_stress_solvent[3])/(3.0*lx*ly*${binWidth})

# Sum pre-divided per-atom contributions over chunks → pressure per bin
compute press_x_polymer polymer reduce/chunk chunk_x_polymer sum v_press_polymer_x
compute press_y_polymer polymer reduce/chunk chunk_y_polymer sum v_press_polymer_y
compute press_z_polymer polymer reduce/chunk chunk_z_poly_p  sum v_press_polymer_z

compute press_x_solvent solvent reduce/chunk chunk_x_solvent  sum v_press_solvent_x
compute press_y_solvent solvent reduce/chunk chunk_y_solvent  sum v_press_solvent_y
compute press_z_solvent solvent reduce/chunk chunk_z_solv_p   sum v_press_solvent_z

# Piston and support partial stresses — same methodology as above.
# These also include the kinetic term (see the KINETIC TERM note above), but the
# walls are not thermostatted and their motion is imposed: both plates are frozen
# during the measurement HOLD, so v_z = 0 and the kinetic contribution vanishes
# there.  It is nonzero only while the plates are being driven (seating, Phase 2a),
# where it is m*v_plate^2 per wall atom.
compute stress_piston  piston  stress/atom NULL
compute stress_support support stress/atom NULL

variable press_piston_z  atom -(c_stress_piston[1]+c_stress_piston[2]+c_stress_piston[3])/(3.0*lx*ly*${binWidth})
variable press_support_z atom -(c_stress_support[1]+c_stress_support[2]+c_stress_support[3])/(3.0*lx*ly*${binWidth})

compute press_z_piston  piston  reduce/chunk chunk_z_piston  sum v_press_piston_z
compute press_z_support support reduce/chunk chunk_z_support sum v_press_support_z

# ── True ZZ partial-stress component (σzz only) ───────────────────────────
# The isotropic press_*_z variables above average (σxx+σyy+σzz)/3, which
# mixes background pressure into the compression signal and cannot be used
# directly to compute the longitudinal modulus.  These variables isolate the
# ZZ component (c_stress[3]) needed for the Terzaghi decomposition:
#   σ'_zz = (σ_p_zz + σ_s_zz) − p_pore
# These carry the kinetic term (see the KINETIC TERM note above), which is what
# you want: the TOTAL σ_zz including n*kT is the quantity that is mechanically
# flat and that balances the piston force.
#
# HOW TO GET p_pore -- and how NOT to.  p_pore is NOT σ_s_zz/φ_s.  That ratio is
# off by 12% between gel and reservoir even at ZERO strain (so it is a
# normalisation artefact, not consolidation physics), for two reasons: σ_s_zz
# contains (1/2)*W_sp, which is momentum handed to the NETWORK, not fluid
# pressure; and even the clean ss part gives W_ss/V_solv = 0.58 (mass-fraction φ)
# or 0.74 (Voronoi) in-gel against 1.014 in the reservoir, because the polymer
# genuinely suppresses solvent-solvent coordination.  The deficit is not
# geometric, so NO choice of φ_s closes it.  For scale: the piston stress at
# ε=0.10 is F_z/A = 0.060, while the φ^mf-vs-φ^vor ambiguity alone moves the
# answer by 0.21 -- 3.5x the whole signal.
#
# Instead read p_pore off the flat pure-solvent RESERVOIR, where φ_s = 1 and there
# is no ambiguity at all (this is what §3 of the notebook does).  The total σ_zz is
# flat within each region and jumps across the piston by exactly F_z/A:
#     ε = 0    : reservoir 1.4889   gel 1.484   difference -0.005
#     ε = 0.10 : reservoir 1.4713   gel 1.537   difference +0.066   (F_z/A = 0.060)
# so σ'_zz = σ_zz^total(gel) − p_pore(reservoir), consistent with the direct piston
# measurement.  Widom test-particle insertion on the traj dumps confirms the
# solvent chemical potential is uniform (Δμ = +0.005 kT at ε=0, +0.034 kT at
# ε=0.10), i.e. p_pore really is the reservoir value everywhere.
variable sigma_p_zz atom -c_stress_polymer[3]/(lx*ly*${binWidth})
variable sigma_s_zz atom -c_stress_solvent[3]/(lx*ly*${binWidth})
variable sigma_p_xx atom -c_stress_polymer[1]/(lx*ly*${binWidth})
variable sigma_s_xx atom -c_stress_solvent[1]/(lx*ly*${binWidth})
variable sigma_p_yy atom -c_stress_polymer[2]/(lx*ly*${binWidth})
variable sigma_s_yy atom -c_stress_solvent[2]/(lx*ly*${binWidth})

# ── NON-VOLUME solvent zz stress (energy units) ──────────────────────────
# Per-atom zz stress with NO division by bin volume.  Summed per z-bin below
# (compute virialzz_solv) it gives the bin's total solvent zz contribution in
# energy units.  §2b of the notebook divides this by the SOLVENT partial volume
# per bin (mass-fraction and Voronoi φ_s) instead of by the whole bin volume.
# Sign matches v_sigma_s_zz (so virialzz_solv / V_solvent == a stress).
#
# Despite the variable name this is NOT virial-only -- it inherits the kinetic
# term from c_stress_solvent (see the KINETIC TERM note above), so
#     virialzz_solv/V_bin = W_ss/V_bin + n_s*kT + (1/2)*W_sp/V_bin
# and §2b is a DIAGNOSTIC of φ_s and of the cross-virial magnitude, not a
# measurement of p_pore.  See the "HOW TO GET p_pore" note above.
variable virial_s_zz atom -c_stress_solvent[3]

compute sigmazz_poly polymer reduce/chunk chunk_z_poly_zz sum v_sigma_p_zz
compute sigmazz_solv solvent  reduce/chunk chunk_z_solv_zz sum v_sigma_s_zz
compute virialzz_solv solvent reduce/chunk chunk_z_solv_vzz sum v_virial_s_zz
compute sigmaxx_poly polymer reduce/chunk chunk_z_poly_xx sum v_sigma_p_xx
compute sigmaxx_solv solvent  reduce/chunk chunk_z_solv_xx sum v_sigma_s_xx
compute sigmayy_poly polymer reduce/chunk chunk_z_poly_yy sum v_sigma_p_yy
compute sigmayy_solv solvent  reduce/chunk chunk_z_solv_yy sum v_sigma_s_yy

# ── Pair-local data for ss-only virial (post-processing) ─────────────────
# compute stress/atom does not support sub-style filtering in this LAMMPS
# build (the "pair" keyword means ALL pair interactions).  Instead, we record
# per-pair virial via compute pair/local and filter for ss pairs in Python.
#
# Using group=solvent guarantees all 3-3 (ss) pairs are captured:
#   For any ss pair (i,j) with i<j by atom ID, both atoms are type 3 and
#   therefore in the solvent group → atom i is always in the group → pair
#   is always included.  Some 3-polymer ps pairs are also captured but are
#   discarded in post-processing by filtering ptype1==ptype2==3.
#
# fx/fy/fz = force on atom I due to atom J.  lj/cut exposes force components
#   but NOT the virial fields p1/p2/p3 (those require special per-pair virial
#   support that lj/cut does not implement → "extra field" error at runtime).
#   The virial is reconstructed in post-processing from forces + positions:
#     p_zz_pair = -(r_z * fz)   where r_z = z_J - z_I  (PBC-corrected)
#     p_xx_pair = -(r_x * fx),  p_yy_pair = -(r_y * fy)
#   Sign convention: positive p means repulsive/compressed → same as p1/p2/p3.
#   z-positions z_I and z_J come from the main traj dump (same dump_freq_prod).
#
# Post-processing steps (see compression_analysis.ipynb):
#   1. Read pairs dump (atom IDs, types, fx/fy/fz) frame by frame.
#   2. Read main traj dump (id type x y z) at the same timesteps.
#   3. Filter: keep rows where ptype1==3 AND ptype2==3.
#   4. For each ss pair:
#        r_x/y/z = pos_J - pos_I  (with PBC wrap: if |r_α| > L_α/2, subtract L_α)
#        p_zz = -(r_z * fz);  z_mid = (z_I + z_J) / 2; assign to z-bin
#   5. sigma_ss_zz(bin) = sum(p_zz_in_bin) / (lx * ly * binWidth)
#      (no extra factor of 2: fx/fy/fz is force on atom I only, and r_I*f_I
#       gives the full pair contribution already — the other half r_J*f_J
#       is equal by Newton's 3rd law, so sum over all I-as-first pairs gives
#       the complete double-counted virial; divide by 2 if you use both atoms)
#      → safest: only count each pair once (as stored in this dump) and use
#        W_pair = -(r_z * fz) without the factor of 2.
compute pl_local  solvent pair/local  fx fy fz
compute ids_local solvent property/local patom1 patom2 ptype1 ptype2

# ── Pair-local + bond-local data for pp-only (polymer self) virial ────────
# Polymer-only stress σ_p,pp(z): the same pair/local technique as σ_s,ss, but
# filtered to polymer-polymer pairs (ptype1,ptype2 ∈ {1,2}) AND augmented with
# the FENE bond virial — every bond in the system is polymer-polymer, so the
# full bond virial is a polymer self-stress contribution.
#
#   group=polymer guarantees every pp pair is captured (both atoms in group).
#   Filter ptype1∈{1,2} AND ptype2∈{1,2} in post-processing to drop ps pairs.
#
# Bond virial (post-processing): for each bond with atoms I,J,
#   r_IJ = pos_J − pos_I (PBC),  |r| = dist
#   compute bond/local `force` = signed scalar bond force (= fbond·r, the actual
#   force magnitude along the bond).  Force on atom I is F_I = −(force/|r|)·r_IJ.
#   W_zz = −(r_z · F_I,z) = (force/|r|)·r_z²   (matches the pair sign convention).
#   Assign to the bond-midpoint z-bin; σ_pp_bond,zz(bin) = Σ W_zz / (lx·ly·binW).
# What comes out of LAMMPS here is virial-only -- pair/local and bond/local carry
# forces, not velocities.  The notebook then adds the polymer kinetic term n_p*kT
# per bin (ADD_KINETIC / KIN_T in its Config cell) so sigma_p,pp is comparable to
# the group-based sigma_p, which includes kinetic (see the KINETIC TERM note above).
# The remaining gap between them is (1/2)*W_sp, the solvent-polymer cross virial,
# and it must match the value the solvent side reports -- the notebook checks this
# (~+0.26 in the gel core from both sides) alongside the BOND_SIGN sign check.
# Note the cross-check must be done in the gel CORE: pair_coeff 1 4 / 1 5 / 2 4 /
# 2 5 are all 1.0, so the group polymer stress also picks up half the polymer-WALL
# cross virial in the contact layers, which this reconstruction excludes.
compute pl_local_poly  polymer pair/local  fx fy fz
compute ids_local_poly polymer property/local patom1 patom2 ptype1 ptype2
compute bnd_local      all     bond/local   force dist
compute bnd_ids        all     property/local batom1 batom2 btype


# ==========================================================================
#            ANALYSIS: FINE-RESOLUTION Z-BINNING (support + piston)
# ==========================================================================
# Dual-resolution scheme: the coarse global profiles (binWidth) above are
# supplemented by finer profiles (binWidth_fine) inside two z-windows that
# track the support and the piston — exactly where σ_zz and the solvent
# density vary most sharply.  The notebook stitches coarse + fine profiles.
#
# Fine profiles are provided for the most diagnostic group-based observables:
#   σ_zz (polymer + solvent → total σ_zz) and solvent number+mass density.
# σ_s,ss and σ_p,pp can be re-binned at any resolution for free in the
# notebook (they are reconstructed from the pair/bond dumps), so they need no
# extra LAMMPS computes here.
#
# Regions track the support COM and piston COM so the windows follow the
# piston as the gel compresses.  Region bounds are re-evaluated each step.
variable fine_sup_zlo equal c_support_com[3]-v_fine_halfwin
variable fine_sup_zhi equal c_support_com[3]+v_fine_halfwin
variable fine_pis_zlo equal c_piston_com[3]-v_fine_halfwin
variable fine_pis_zhi equal c_piston_com[3]+v_fine_halfwin
region reg_fine_support block EDGE EDGE EDGE EDGE v_fine_sup_zlo v_fine_sup_zhi side in
region reg_fine_piston  block EDGE EDGE EDGE EDGE v_fine_pis_zlo v_fine_pis_zhi side in

# Fine per-atom σ_zz (bin volume uses binWidth_fine, not binWidth!)
variable sigma_p_zz_f atom -c_stress_polymer[3]/(lx*ly*${binWidth_fine})
variable sigma_s_zz_f atom -c_stress_solvent[3]/(lx*ly*${binWidth_fine})

# One chunk/atom per reduce/chunk user (LAMMPS forbids sharing a chunk/atom
# between fixes in incompatible ways — see CHUNK DEFINITIONS note above).
compute chunk_zf_poly_sup polymer chunk/atom bin/1d z lower ${binWidth_fine} region reg_fine_support
compute chunk_zf_poly_pis polymer chunk/atom bin/1d z lower ${binWidth_fine} region reg_fine_piston
compute chunk_zf_solv_sup solvent chunk/atom bin/1d z lower ${binWidth_fine} region reg_fine_support
compute chunk_zf_solv_pis solvent chunk/atom bin/1d z lower ${binWidth_fine} region reg_fine_piston
compute chunk_zf_dens_sup solvent chunk/atom bin/1d z lower ${binWidth_fine} region reg_fine_support
compute chunk_zf_dens_pis solvent chunk/atom bin/1d z lower ${binWidth_fine} region reg_fine_piston

# Coarse solvent-density chunk (defined here, not in the density OUTPUT section,
# so it is available to BOTH the reference window and production density fixes).
compute chunk_z_solv_density solvent chunk/atom bin/1d z lower ${binWidth}

compute sigmazz_poly_fs polymer reduce/chunk chunk_zf_poly_sup sum v_sigma_p_zz_f
compute sigmazz_poly_fp polymer reduce/chunk chunk_zf_poly_pis sum v_sigma_p_zz_f
compute sigmazz_solv_fs solvent reduce/chunk chunk_zf_solv_sup sum v_sigma_s_zz_f
compute sigmazz_solv_fp solvent reduce/chunk chunk_zf_solv_pis sum v_sigma_s_zz_f


# ==========================================================================
#                 ANALYSIS: POLYMER Z-DISPLACEMENT
# ==========================================================================
# u_z(z, t): mean z-displacement of polymer atoms per z-bin.
# Feeds the cooperative-diffusivity extraction via:
#   ∂u_z/∂t = D_c ∂²u_z/∂z²
# phi_p ∝ u_z, so this PDE is equivalent to the volume-fraction formulation
# but avoids the computationally expensive Voronoi step.
#
# Uses the same z-binning (chunk_z_polymer) as the stress profiles so that
# displacement and stress outputs are spatially registered.
# Reference is the Phase 2 start (set by run 0 above); u_z(z, 0) = 0 everywhere.

variable uz_poly atom c_displace_poly[3]

# Note: compute reduce/chunk only supports sum/min/max, not ave.
# Per-bin mean is obtained directly via fix ave/chunk in the OUTPUT section below.


print ">>> Phase 2 start: piston_z=$(c_piston_com[3])  gel_top_rg=$(v_gel_top_rg)  gel_top_raw=$(c_maxz)  support_z=$(c_support_com[3])"

# ==========================================================================
#  PHASE 1.5: PRE-COMPRESSION REFERENCE-STATE (ε=0) RECORDING
# ==========================================================================
# Skipped for cont=1: the reference files already exist from the original run.
#
# The piston is held at v=0 and ALL observables are averaged over a window of
# ref_avg_steps (≈150k) so that compression_analysis.ipynb has a clean ε=0
# reference for every quantity.  Unlike the production stress fixes (which
# emit on the nfreq_stress cadence tied to nsteps and would give only the
# post-compression state as their first snapshot), the reference fixes use a
# dedicated ref_nfreq cadence so the window yields SEVERAL snapshots
# (ref_avg_steps / ref_nfreq ≈ 15) — enough for the notebook to form
# confidence intervals on each reference profile.
#
# Reference observables (all tagged "_ref_"):
#   • partial-stress components σ_zz/σ_xx/σ_yy, polymer + solvent (coarse)
#   • fine-binned σ_zz, polymer + solvent, support + piston windows
#   • solvent number + mass density (coarse + fine)
#   • ss / pp / bond / traj dumps over the window → σ_s,ss and σ_p,pp reference
#
# CHUNK/ATOM LOCK: the reference fixes share chunk/atom computes with the
# production fixes (chunk_z_poly_zz, chunk_zf_*, chunk_z_solv_density, …).
# They MUST be torn down — and their chunk/atom locks released — before the
# production fixes are defined.  fix ave/time / ave/chunk release their lock
# only when end_of_step fires unlock() at an nfreq epoch boundary (their
# destructor unlocks only for ave=RUNNING/WINDOW, not the default ave=ONE).
# So the reference run length is padded to end on a ref_nfreq boundary; the
# subsequent unfix then sees lockfix==nullptr and is a clean no-op for lock
# state.  See the chunk/atom lock note in slab_with_flow's history.
if "${cont} == 1" then "jump SELF label_after_ref_rec"

# ==========================================================================
#   PHASE 1.25: SYMMETRIC SEATING — BRING BOTH PLATES TO THE GEL, RECORD L0 (BB)
# ==========================================================================
# Both the piston (from above) and the support (from below) are advanced to the
# gel surfaces so the equilibrium-swollen gel is gripped between them WITHOUT
# being compressed.  Travel distances are read from the BOUNDING-BOX gel extents
# measured at the end of Phase 0 (c_maxz = gel top, c_minz = gel bottom); each
# plate is stopped a contact_gap short of the gel face.
#
# v = d/t with a COMMON time t (t_seat): the piston and support travel DIFFERENT
# distances (d_piston, d_support) but arrive TOGETHER, so neither plate reaches
# the gel early and shoves it off-centre.  Both plates are rigid with all forces
# off, so they translate ballistically at the set velocity (ignoring the gel
# during the approach); we stop them at t_seat by zeroing their velocities.
#
# After a short settle (both plates fixed) the gel relaxes against the just-
# touching plates and we record L0_bb = the BB gel thickness = the ε=0 reference
# thickness.  The APPLIED strain in the sweep is prescribed as a piston
# displacement = strain*L0_bb (see the sweep loop), so L0_bb is the strain
# DENOMINATOR; the MEASURED BB thickness change is compared against it in the
# notebook to confirm the plates truly bracket the gel (BB top/bottom overlap the
# piston/support faces, and BB strain ≈ prescribed strain).
# (t_seat and nsteps_settle are defined up in Phase 0 with the setup-movie cadence.)

print '========================================'
print 'Phase 1.25: symmetric seating (piston down + support up, common time)'
print '========================================'
print ">>> approach start: piston_gel_gap=$(v_piston_gel_gap:%.2f)  gel_bot_gap=$(v_gel_bot_gap:%.2f)  piston_support_gap=$(v_piston_support_gap:%.2f)"

# --- Travel distances from the BB gel extents (frozen to numbers right now) ---
variable gel_top_bb0 equal $(c_maxz)
variable gel_bot_bb0 equal $(c_minz)
variable piston_z0   equal $(c_piston_com[3])
variable support_z0  equal $(c_support_com[3])
variable d_piston    equal $(v_piston_z0 - v_gel_top_bb0 - v_contact_gap)   # piston travels DOWN this far
variable d_support   equal $(v_gel_bot_bb0 - v_support_z0 - v_contact_gap)  # support travels UP   this far
# Signed z-velocities (piston -z, support +z) over the common time t_seat.
variable vseat_piston  equal $(-1.0*v_d_piston/(v_t_seat*v_timestep_prod))
variable vseat_support equal $(v_d_support/(v_t_seat*v_timestep_prod))
print ">>> seating: d_piston=${d_piston}  d_support=${d_support}  v_piston=${vseat_piston}  v_support=${vseat_support}  (t_seat=${t_seat} steps)"

velocity piston  set 0.0 0.0 ${vseat_piston}
velocity support set 0.0 0.0 ${vseat_support}
run ${t_seat}
velocity piston  set 0.0 0.0 0.0
velocity support set 0.0 0.0 0.0
print ">>> seated: piston_z=$(c_piston_com[3]:%.2f)  support_z=$(c_support_com[3]:%.2f)  gel_top_bb=$(c_maxz:%.2f)  gel_bot_bb=$(c_minz:%.2f)"

# --- Short settle: gel relaxes against the just-touching plates (both fixed) ---
print ">>> settling ${nsteps_settle} steps before recording the reference..."
run ${nsteps_settle}

# ----- Record the ε=0 reference thicknesses at the seated state -----
# BB is the AUTHORITATIVE reference thickness (strain denominator via the
# prescribed piston displacement).  Rg thickness and the piston-support gap are
# recorded as INDEPENDENT diagnostics for the notebook overlap/verification plot.
variable L0_bb         equal $(v_gel_lz_bb)
variable gel_strain_bb equal (v_L0_bb - v_gel_lz_bb)/v_L0_bb
variable piston_seat_z  equal $(c_piston_com[3])
variable support_seat_z equal $(c_support_com[3])
variable L0_gap        equal $(v_piston_support_gap)
variable piston_strain equal (v_L0_gap-v_piston_support_gap)/v_L0_gap
variable gel_lz_initial delete
variable gel_lz_initial equal $(v_gel_lz_rg)
print ">>> Reference thicknesses:  L0_bb=${L0_bb} (authoritative)  L0_rg=${gel_lz_initial}  L0_gap=${L0_gap}  piston_seat_z=${piston_seat_z}  support_seat_z=${support_seat_z}"

# ----- OUTPUT-FILE TAG = the length of the measurement hold (2026-09-03) -----
# Every reference and production file is named ..._${dataname}_${interaction}_<hold>[_c<strain>]
# where <hold> is the auto-sized hold length of that strain level in steps -- the
# role the flat NSTEPS tag played before hold_auto.  The hold is a deterministic
# function of the level's TARGET compressed thickness L0_bb*(1-strain) (the drive
# halts at exactly that displacement), so the tag is known at the start of each
# level, before any of its files is opened; the sweep loop recomputes it per level.
# The eps=0 reference files, shared by every level, carry the FIRST level's tag.
# With -var hold_auto 0 every tag collapses back to ${nsteps} (old convention).
# The analysis notebooks resolve the tags from the files themselves (NSTEPS=None).
variable hold_L    delete
variable tau_cons  delete
variable hold_raw  delete
variable hold_want delete
variable hold_rnd  delete
variable hold_len  delete
variable hold_tag  delete
variable hold_L    equal ${L0_bb}*(1.0-${compressions})
variable tau_cons  equal $(v_hold_L*v_hold_L/(v_pi_sq*v_Dc_est))
variable hold_raw  equal $(ceil(v_n_tau_hold*v_tau_cons/v_timestep_prod))
variable hold_rnd  equal $(ceil(v_hold_raw/v_hold_round)*v_hold_round)
variable hold_want equal (v_hold_rnd>v_hold_min)*v_hold_rnd+(v_hold_rnd<=v_hold_min)*v_hold_min
variable hold_len  equal ${hold_auto}*${hold_want}+(1-${hold_auto})*${nsteps}
variable hold_tag  string $(v_hold_len:%.0f)
print ">>> reference files tagged _${hold_tag} (= hold length of the first level, strain ${compressions})"

print '========================================'
print 'Phase 1.5: ε=0 reference recording (${ref_avg_steps} steps, ref_nfreq=${ref_nfreq})'
print '========================================'

# Hold the piston still (rigid + frozen at contact) during the reference window.
velocity piston set 0.0 0.0 0.0

# ----- Reference-state piston load (2026-09-05) -----
# Block-averaged F_z on the seated, frozen piston over the whole reference window
# (same cadence as the production piston_force_avg files).  This is the PRELOAD the
# epsilon=0 state actually carries: the notebook prints it as P_ref = <F_z>/A next
# to the reference gel-minus-reservoir sigma_zz step, so the two can be compared
# directly (they must agree if the profile method is unbiased at zero strain), and
# it is available for an incremental M = (P - P_ref)/eps.  c_piston_fz is a global
# reduce (no chunk/atom lock), so this fix carries no epoch constraint.
fix ref_piston_force_avg all ave/time ${pf_nevery} ${pf_nrepeat} ${pf_nfreq} &
    c_piston_fz ave one &
    file output_files/piston_data/piston_force_avg_ref_${dataname}_${interaction}_${hold_tag}.dat

# ----- Coarse partial-stress component references -----
fix ref_sigmazz_poly all ave/time ${ref_nevery} ${ref_nrepeat} ${ref_nfreq} c_sigmazz_poly mode vector file output_files/stress_data/sigmazz_polymer_ref_${dataname}_${interaction}_${hold_tag}.dat
fix ref_sigmazz_solv all ave/time ${ref_nevery} ${ref_nrepeat} ${ref_nfreq} c_sigmazz_solv mode vector file output_files/stress_data/sigmazz_solvent_ref_${dataname}_${interaction}_${hold_tag}.dat
fix ref_virialzz_solv all ave/time ${ref_nevery} ${ref_nrepeat} ${ref_nfreq} c_virialzz_solv mode vector file output_files/stress_data/virialzz_solvent_ref_${dataname}_${interaction}_${hold_tag}.dat
fix ref_sigmaxx_poly all ave/time ${ref_nevery} ${ref_nrepeat} ${ref_nfreq} c_sigmaxx_poly mode vector file output_files/stress_data/sigmaxx_polymer_ref_${dataname}_${interaction}_${hold_tag}.dat
fix ref_sigmaxx_solv all ave/time ${ref_nevery} ${ref_nrepeat} ${ref_nfreq} c_sigmaxx_solv mode vector file output_files/stress_data/sigmaxx_solvent_ref_${dataname}_${interaction}_${hold_tag}.dat
fix ref_sigmayy_poly all ave/time ${ref_nevery} ${ref_nrepeat} ${ref_nfreq} c_sigmayy_poly mode vector file output_files/stress_data/sigmayy_polymer_ref_${dataname}_${interaction}_${hold_tag}.dat
fix ref_sigmayy_solv all ave/time ${ref_nevery} ${ref_nrepeat} ${ref_nfreq} c_sigmayy_solv mode vector file output_files/stress_data/sigmayy_solvent_ref_${dataname}_${interaction}_${hold_tag}.dat

# ----- Fine-binned σ_zz references (support + piston windows) -----
fix ref_sigmazz_poly_fs all ave/time ${ref_nevery} ${ref_nrepeat} ${ref_nfreq} c_sigmazz_poly_fs mode vector file output_files/stress_data/sigmazz_polymer_fine_support_ref_${dataname}_${interaction}_${hold_tag}.dat
fix ref_sigmazz_poly_fp all ave/time ${ref_nevery} ${ref_nrepeat} ${ref_nfreq} c_sigmazz_poly_fp mode vector file output_files/stress_data/sigmazz_polymer_fine_piston_ref_${dataname}_${interaction}_${hold_tag}.dat
fix ref_sigmazz_solv_fs all ave/time ${ref_nevery} ${ref_nrepeat} ${ref_nfreq} c_sigmazz_solv_fs mode vector file output_files/stress_data/sigmazz_solvent_fine_support_ref_${dataname}_${interaction}_${hold_tag}.dat
fix ref_sigmazz_solv_fp all ave/time ${ref_nevery} ${ref_nrepeat} ${ref_nfreq} c_sigmazz_solv_fp mode vector file output_files/stress_data/sigmazz_solvent_fine_piston_ref_${dataname}_${interaction}_${hold_tag}.dat

# ----- Solvent number + mass density references (coarse + fine) -----
fix ref_dens     all ave/chunk ${ref_nevery} ${ref_nrepeat} ${ref_nfreq} chunk_z_solv_density density/number density/mass file output_files/chemical_potential/solvent_density_z_ref_${dataname}_${interaction}_${hold_tag}.dat
fix ref_dens_fs  all ave/chunk ${ref_nevery} ${ref_nrepeat} ${ref_nfreq} chunk_zf_dens_sup    density/number density/mass file output_files/chemical_potential/solvent_density_z_fine_support_ref_${dataname}_${interaction}_${hold_tag}.dat
fix ref_dens_fp  all ave/chunk ${ref_nevery} ${ref_nrepeat} ${ref_nfreq} chunk_zf_dens_pis    density/number density/mass file output_files/chemical_potential/solvent_density_z_fine_piston_ref_${dataname}_${interaction}_${hold_tag}.dat

# ----- ss / pp / bond / traj reference dumps (one frame per ref_nfreq) -----
# dump local/custom carry no fix ave/time epoch-lock issue, so they may run
# freely through the window; each emits ≈ref_avg_steps/ref_nfreq frames that
# the notebook averages (with CIs) for the σ_s,ss and σ_p,pp references.
dump pairlocal_ref      solvent local  ${ref_nfreq} output_files/pair_data/pairs_ref_${dataname}_${interaction}_${hold_tag}.dump c_ids_local[1] c_ids_local[2] c_ids_local[3] c_ids_local[4] c_pl_local[1] c_pl_local[2] c_pl_local[3]
dump pairlocal_poly_ref polymer local  ${ref_nfreq} output_files/pair_data/polymer_pairs_ref_${dataname}_${interaction}_${hold_tag}.dump c_ids_local_poly[1] c_ids_local_poly[2] c_ids_local_poly[3] c_ids_local_poly[4] c_pl_local_poly[1] c_pl_local_poly[2] c_pl_local_poly[3]
dump bondlocal_ref      all     local  ${ref_nfreq} output_files/pair_data/bonds_ref_${dataname}_${interaction}_${hold_tag}.dump c_bnd_ids[1] c_bnd_ids[2] c_bnd_ids[3] c_bnd_local[1] c_bnd_local[2]
dump traj_ref           gel_system custom ${ref_nfreq} traj_files/traj_ref_${dataname}_${interaction}_${hold_tag}.lammpstrj id type mol x y z

# Run for ref_avg_steps, PADDED up to the next ref_nfreq epoch boundary so the
# ave/time + ave/chunk locks release cleanly on end_of_step (see note above).
variable ref_run_steps equal (floor(($(step)+${ref_avg_steps}-1)/${ref_nfreq})+1)*${ref_nfreq}-$(step)
print '>>> Reference window: running ${ref_run_steps} steps (≥ ${ref_avg_steps}, aligned to ref_nfreq=${ref_nfreq})'
run ${ref_run_steps}

# Tear down reference dumps and fixes (locks already released at epoch boundary)
unfix ref_piston_force_avg
undump pairlocal_ref
undump pairlocal_poly_ref
undump bondlocal_ref
undump traj_ref
unfix ref_sigmazz_poly
unfix ref_sigmazz_solv
unfix ref_virialzz_solv
unfix ref_sigmaxx_poly
unfix ref_sigmaxx_solv
unfix ref_sigmayy_poly
unfix ref_sigmayy_solv
unfix ref_sigmazz_poly_fs
unfix ref_sigmazz_poly_fp
unfix ref_sigmazz_solv_fs
unfix ref_sigmazz_solv_fp
unfix ref_dens
unfix ref_dens_fs
unfix ref_dens_fp

# Both plates stay rigid + frozen (rigid, forces off, v=0) at the seated state
# through the end of the reference window; the sweep loop below drives BOTH plates
# at prescribed velocity (piston down, support up) to each strain level.

print '>>> Reference recording done.  step=$(step)  gel_strain_bb=$(v_gel_strain_bb:%.4f)  gel_strain_rg=$(v_gel_strain:%.4f)'

label label_after_ref_rec


# ==========================================================================
#            ONE-TIME SETUP FOR THE STRAIN SWEEP (post-reference)
# ==========================================================================
# The gel is at P_target, the epsilon=0 reference files are written, the BB
# reference thickness L0_bb was recorded at the seated (both-plates-touching)
# state, and both plates are rigid + frozen there.  The loop below walks the
# cumulative ${compressions} STRAIN levels: for each it (a) drives the piston DOWN
# and the support UP (drive_split shares of the closure rate v_piston_prod) until
# the plate gap has closed by strain*L0_bb from the seated gap L0_gap, (b) FREEZES
# both plates, and (c) runs an auto-sized measurement HOLD recording the full
# observable set tagged _c<strain> while the network stress relaxes.  STRAIN IS
# PRESCRIBED (the denominator); STRESS IS MEASURED; M = measured stress / strain.

variable gel_strain_pct    equal v_gel_strain*100.0
variable gel_strain_bb_pct equal v_gel_strain_bb*100.0
# NOTE: LAMMPS `shell mkdir` is not /bin/sh — every argument is taken as a
#       directory name and intermediate dirs are created anyway. Passing -p
#       here silently created a stray directory literally named "-p" in every
#       run dir (fixed 2026-08-30); do not add it back.
shell mkdir output_files/chemical_potential

# ----- Both plates stay VELOCITY-controlled (rigid, forces off) for the sweep -----
# Piston and support are already rigid with all forces off (from Phase 1.25).
# Loading is velocity-controlled and SYMMETRIC: set z-velocities drive the piston
# down and the support up until the plate gap reaches the level's target, then
# both are frozen (v=0) for the hold.  No box/force barostat on either plate --
# the prescribed gap closure sets the strain directly.  The halt watches the live
# plate gap v_piston_support_gap (defined in the POLYMER TRACKING block), so it is
# correct for any drive_split.
# (cont=1 is unsupported for the sweep -- it skipped seating so L0_bb is undefined.)
velocity piston  set 0.0 0.0 0.0
velocity support set 0.0 0.0 0.0

# gel_setup movie is still open (from Phase 0).  It is undumped after the FIRST
# level's loading (= first time the piston is loaded).  This flag makes a
# multi-level sweep record only that first loading in the movie and keeps cont=1
# (no gel_setup) safe.
variable movie_open equal 1

print "############################################################"
print ">>> STRAIN SWEEP LIST (raw from run_lammps.sh): ${compressions_list}"
print ">>>   first strain=${compressions}   drive cap=${nsteps_comp}"
print ">>>   HOLD: auto=${hold_auto} (1=sized per level from tau_1=L^2/(pi^2 D_c))"
print ">>>         Dc_est=${Dc_est}  n_tau_hold=${n_tau_hold}  hold_min=${hold_min}  flat fallback nsteps=${nsteps}"
print ">>>   BB reference thickness L0_bb = ${L0_bb}  (strain denominator);  seated plate gap L0_gap = ${L0_gap}"
print ">>>   DRIVE: symmetric, drive_split=${drive_split} (piston share of the closure; the support takes the rest)"
print ">>>          closure rate ${v_piston_prod} sigma/tau -> piston $(v_vdrive_pist:%.4f) down, support $(v_vdrive_supp:%.4f) up"
print ">>>   If the line above reads 'STALE-run_lammps.sh...', only ONE level"
print ">>>   will run -- update run_lammps.sh on the cluster and resubmit."
print "############################################################"


# ==========================================================================
#                    COMPRESSION SWEEP LOOP (cumulative)
# ==========================================================================
# Epoch note: every fix ave/time (mode vector, via reduce/chunk) and fix
# ave/chunk below is created right before the production 'run ${hold_steps}'
# and removed right after it.  hold_steps is padded so the run ENDS on an
# nfreq_stress epoch boundary (multiple of nfreq_stress from step 0), so
# end_of_step fires unlock() on the chunk/atom compute BEFORE the unfix -- the
# same idiom the epsilon=0 reference window uses to avoid the "Two fix commands
# using same compute chunk/atom in incompatible ways" lock corruption.
label comp_loop

print "########################################################"
print "  STRAIN TARGET (cumulative) = ${compressions}"
print "########################################################"

# ----- THIS level's HOLD length (and output-file tag) from its TARGET thickness -----
# tau_1 = L^2/(pi^2 D_c) with L = L0_bb*(1-strain), the compressed BB thickness the
# drive below halts at, so the hold is sized on the compressed thickness of this
# level: tau_1 shrinks like (1-eps)^2 across the sweep.  Computed BEFORE the level's
# loggers open so that every file of the level is tagged _${hold_tag}_c${compressions}.
# delete-first everywhere: this build refuses to redefine an equal-style variable.
variable hold_L    delete
variable tau_cons  delete
variable hold_raw  delete
variable hold_want delete
variable hold_rnd  delete
variable hold_len  delete
variable hold_tag  delete
variable hold_L    equal ${L0_bb}*(1.0-${compressions})
variable tau_cons  equal $(v_hold_L*v_hold_L/(v_pi_sq*v_Dc_est))
variable hold_raw  equal $(ceil(v_n_tau_hold*v_tau_cons/v_timestep_prod))
variable hold_rnd  equal $(ceil(v_hold_raw/v_hold_round)*v_hold_round)
variable hold_want equal (v_hold_rnd>v_hold_min)*v_hold_rnd+(v_hold_rnd<=v_hold_min)*v_hold_min
variable hold_len  equal ${hold_auto}*${hold_want}+(1-${hold_auto})*${nsteps}
variable hold_tag  string $(v_hold_len:%.0f)
print ">>> [strain=${compressions}] hold sizing: target L_bb=$(v_hold_L:%.2f) sigma  D_c=${Dc_est}  tau_1=$(v_tau_cons:%.1f) tau = $(v_tau_cons/v_timestep_prod:%.0f) steps"
print ">>> [strain=${compressions}] hold_len=${hold_len} steps (= ${n_tau_hold} tau_1; auto=${hold_auto}, floor=${hold_min}, flat fallback=${nsteps})  ->  files tagged _${hold_tag}_c${compressions}"

# ----- Per-level loggers that span BOTH the settle and the hold -----
# fix print (and one GLOBAL ave/time on c_piston_fz) -- none use a compute
# chunk/atom, so they carry NO lock and may be unfixed at any step.  They record
# the piston descent + strain rise during loading AND the equilibrated hold.
fix out_piston_pos all print ${strain_freq} "$(step) $(c_piston_com[3])" &
    file output_files/piston_data/piston_position_${dataname}_${interaction}_${hold_tag}_c${compressions}.dat screen no
fix out_piston_vel all print ${strain_freq} "$(step) $(c_piston_vz)" &
    file output_files/piston_data/piston_velocity_${dataname}_${interaction}_${hold_tag}_c${compressions}.dat screen no
# support plane z(t) -- it moves during the symmetric drive (2026-09-18); the D_c fit
# and the wall lines in the notebooks read the held position from this file
fix out_support_pos all print ${strain_freq} "$(step) $(c_support_com[3])" &
    title "# step z_support" &
    file output_files/piston_data/support_position_${dataname}_${interaction}_${hold_tag}_c${compressions}.dat screen no
fix out_piston_force all print ${volume_freq} '$(step) $(c_piston_fz)' &
    file output_files/piston_data/piston_force_${dataname}_${interaction}_${hold_tag}_c${compressions}.dat screen no
fix out_piston_force_avg all ave/time ${pf_nevery} ${pf_nrepeat} ${pf_nfreq} &
    c_piston_fz ave one &
    file output_files/piston_data/piston_force_avg_${dataname}_${interaction}_${hold_tag}_c${compressions}.dat
fix out_strain_zz all print ${strain_freq} &
    "$(step) ${gel_lz_initial} $(v_gel_lz_rg)" &
    file output_files/stress_data/strain_zz_${dataname}_${interaction}_${hold_tag}_c${compressions}.dat screen no
# Boundary (piston-support) strain: step, L0_gap, piston_support_gap, piston_strain.
# DIAGNOSTIC only now -- the authoritative strain is the PRESCRIBED target
# (denominator) and the MEASURED BB strain (from gel_dimensions_bb).  All three
# (BB, Rg, boundary) are logged so the notebook can overlay them.
fix out_strain_piston all print ${strain_freq} &
    "$(step) ${L0_gap} $(v_piston_support_gap) $(v_piston_strain)" &
    file output_files/stress_data/strain_piston_${dataname}_${interaction}_${hold_tag}_c${compressions}.dat screen no
fix out_gel_strain_thermo all print ${thermo_freq} &
    ">>> gel_strain = $(v_gel_strain_bb_pct:%.2f) %" screen yes &
    file output_files/stress_data/gel_strain_log_${dataname}_${interaction}_${hold_tag}_c${compressions}.dat
fix out_gel_vol_bb all print ${strain_freq} "$(step) $(v_gel_vol_bb)" &
    file output_files/volume_data/gel_volume_bb_${dataname}_${interaction}_${hold_tag}_c${compressions}.dat screen no
fix out_gel_dims_bb all print ${strain_freq} "$(step) $(v_gel_lx_bb) $(v_gel_ly_bb) $(v_gel_lz_bb)" &
    file output_files/volume_data/gel_dimensions_bb_${dataname}_${interaction}_${hold_tag}_c${compressions}.dat screen no
fix out_gel_vol_rg all print ${strain_freq} "$(step) $(v_gel_vol_rg)" &
    file output_files/volume_data/gel_volume_rg_${dataname}_${interaction}_${hold_tag}_c${compressions}.dat screen no
fix out_gel_dims_rg all print ${strain_freq} "$(step) $(v_gel_lx_rg) $(v_gel_ly_rg) $(v_gel_lz_rg)" &
    file output_files/volume_data/gel_dimensions_rg_${dataname}_${interaction}_${hold_tag}_c${compressions}.dat screen no
fix out_box_dims all print ${strain_freq} "$(step) $(v_box_lx) $(v_box_ly) $(v_box_lz)" &
    file output_files/volume_data/box_dimensions_${dataname}_${interaction}_${hold_tag}_c${compressions}.dat screen no
fix out_polymer_com all print ${strain_freq} &
    "$(step) $(c_polymer_com[1]) $(c_polymer_com[2]) $(c_polymer_com[3])" &
    file output_files/volume_data/polymer_com_${dataname}_${interaction}_${hold_tag}_c${compressions}.dat screen no
# ----- Edge-overlap logger: gel BB bottom/top vs support/piston faces -----
# For the notebook verification plot: columns = step, gel_bot_bb (c_minz),
# gel_top_bb (c_maxz), piston_z, support_z.  Confirms the plates bracket the gel
# (support at the BB bottom, piston at the BB top) and stay in contact as the
# gel compresses -- i.e. the BB method captures the true gel thickness.
fix out_gel_edges all print ${strain_freq} &
    "$(step) $(c_minz) $(c_maxz) $(c_piston_com[3]) $(c_support_com[3])" &
    file output_files/volume_data/gel_edges_${dataname}_${interaction}_${hold_tag}_c${compressions}.dat screen no

# ----- cont=1 CONTINUATION (single-level only): the data file already holds
# the gel at whatever strain level was passed in via ${compressions} (continue_sim.sh
# auto-detects the last level reached and supplies it as the ONLY sweep value) --
# skip the drive-to-target entirely (it needs L0_bb/piston_seat_z, which only
# exist when Phase 1.25 ran, and Phase 1.25 is skipped under cont=1) and go
# straight to the equilibration-only measurement hold below.
if "${cont} == 1" then "jump SELF label_skip_drive"

# ----- PHASE 2a: SYMMETRIC drive of both plates to the prescribed cumulative STRAIN target -----
# Prescribed strain: the plate gap closes by strain*L0_bb (strain = ${compressions},
# cumulative from the seated reference), i.e. the target gap is
#     gap_target = L0_gap - strain*L0_bb.
# The piston is driven DOWN at vdrive_pist and the support UP at vdrive_supp
# (drive_split shares of the closure rate v_piston_prod) until the live
# piston-support gap reaches gap_target (fix halt), so the APPLIED strain is
# exactly ${compressions} and both gel faces are loaded alike (the gel mid-plane
# stays put for drive_split = 0.5).  The per-plate target planes are printed for
# the log only.  nsteps_comp is a SAFETY CAP; the halt normally stops the drive far
# sooner (a ~5-10% increment needs only ~10^4 steps at v_piston_prod).
variable gap_target       equal ${L0_gap}-${compressions}*${L0_bb}
variable piston_target_z  equal ${piston_seat_z}-${drive_split}*${compressions}*${L0_bb}
variable support_target_z equal ${support_seat_z}+(1.0-${drive_split})*${compressions}*${L0_bb}
velocity piston  set 0.0 0.0 -${vdrive_pist}
velocity support set 0.0 0.0  ${vdrive_supp}
fix halt_compress all halt ${strain_freq} v_piston_support_gap <= ${gap_target} error continue
# FIRST level only: bump the gel_setup movie to a FINER cadence for the drive so
# the piston descent is well resolved (~num_drive_frames frames), then undump it
# right after (guarded by cont — cont=1 has no gel_setup — and movie_open).
# Estimated drive length = strain*L0_bb / (v_piston_prod*dt); cadence = est / N.
variable drive_dump_freq equal floor((${compressions}*${L0_bb}/(${v_piston_prod}*${timestep_prod}))/${num_drive_frames})
if "${cont} == 0 && ${movie_open} == 1" then "dump_modify traj_setup every ${drive_dump_freq}"
print ">>> [strain=${compressions}] driving piston DOWN to z=${piston_target_z} and support UP to z=${support_target_z}: target gap ${gap_target} = L0_gap - ${compressions}*L0_bb (cap ${nsteps_comp} steps; drive frames every ${drive_dump_freq})..."
run ${nsteps_comp}
unfix halt_compress
if "${cont} == 0 && ${movie_open} == 1" then &
    "undump traj_setup" &
    "variable movie_open delete" &
    "variable movie_open equal 0"

label label_skip_drive

# ----- Freeze BOTH plates at this strain for the measurement hold -----
# Velocity-controlled loading is done; freeze the piston and the support (v=0,
# still rigid with forces off) so the network stress RELAXES at fixed strain
# during the hold.  The measured stress at this fixed strain gives M.
# (Under cont=1 this is a no-op: both plates should already be at rest at this
# strain from the continued run's final state.)
velocity piston  set 0.0 0.0 0.0
velocity support set 0.0 0.0 0.0
print ">>> [strain=${compressions}] drive done: gel_strain_bb = $(v_gel_strain_bb:%.4f)  gel_strain_rg = $(v_gel_strain:%.4f)  piston_z = $(c_piston_com[3]:%.2f)  support_z = $(c_support_com[3]:%.2f)  gap = $(v_piston_support_gap:%.2f) (target $(v_gap_target:%.2f))  step=$(step)"

# ----- Hold-length check: the live compressed thickness vs the target it was sized on -----
print ">>> [strain=${compressions}] live L_bb=$(v_gel_lz_bb:%.2f) vs target $(v_hold_L:%.2f) sigma (hold_len=${hold_len} steps was sized on the target)"

# ----- Per-level output cadences, re-derived from THIS level's hold -----
# Same clamping logic as the baseline block near the top of the file, but keyed
# on hold_len instead of nsteps, so each level keeps its ~num_stress_curves
# stress frames / ~num_dump_frames movie frames no matter how long its hold is.
# nfreq_stress must stay fixed for the LIFETIME of the ave/chunk fixes below
# (the chunk/atom lock epoch) -- it is, since they are created and destroyed
# inside this iteration, after this block.
variable nfreq_raw        delete
variable nrepeat_raw      delete
variable nr_lo            delete
variable nrepeat_stress   delete
variable nevery_stress    delete
variable nfreq_stress     delete
variable dump_freq_prod   delete
variable nfreq_widom_dump delete
variable nfreq_raw        equal floor(${hold_len}/v_num_stress_curves)
variable nrepeat_raw      equal floor(v_nfreq_raw/v_nevery_target)
variable nr_lo            equal (v_nrepeat_raw>v_nrepeat_min)*v_nrepeat_raw+(v_nrepeat_raw<=v_nrepeat_min)*v_nrepeat_min
variable nrepeat_stress   equal (v_nr_lo<v_nrepeat_max)*v_nr_lo+(v_nr_lo>=v_nrepeat_max)*v_nrepeat_max
variable nevery_stress    equal floor(v_nfreq_raw/v_nrepeat_stress)
variable nfreq_stress     equal v_nevery_stress*v_nrepeat_stress
variable dump_freq_prod   equal floor(${hold_len}/v_num_dump_frames)
variable nfreq_widom_dump equal floor(${hold_len}/v_num_widom_frames)
print ">>> [strain=${compressions}] stress cadence: nevery=${nevery_stress} nrepeat=${nrepeat_stress} nfreq=${nfreq_stress}  |  movie every ${dump_freq_prod}"

# ----- Reset the displacement reference to the loaded state so
#       u_z(z,0)=0 at the onset of THIS level's measurement hold (for D_c). -----
variable uz_poly delete
uncompute displace_poly
compute displace_poly polymer displace/atom
variable uz_poly atom c_displace_poly[3]
# ----- PHASE 2b: production HOLD -- chunk-locked averaging fixes created HERE -----
dump traj_flow gel_system custom ${dump_freq_prod} &
    traj_files/gel_flow_${dataname}_${interaction}_${hold_tag}_c${compressions}.lammpstrj &
    id type mol x y z
dump pairlocal_dump solvent local ${nfreq_stress} &
    output_files/pair_data/pairs_${dataname}_${interaction}_${hold_tag}_c${compressions}.dump &
    c_ids_local[1] c_ids_local[2] c_ids_local[3] c_ids_local[4] &
    c_pl_local[1] c_pl_local[2] c_pl_local[3]
dump traj_stress_sync gel_system custom ${nfreq_stress} &
    traj_files/traj_stress_${dataname}_${interaction}_${hold_tag}_c${compressions}.lammpstrj &
    id type mol x y z
dump pairlocal_poly polymer local ${nfreq_stress} &
    output_files/pair_data/polymer_pairs_${dataname}_${interaction}_${hold_tag}_c${compressions}.dump &
    c_ids_local_poly[1] c_ids_local_poly[2] c_ids_local_poly[3] c_ids_local_poly[4] &
    c_pl_local_poly[1] c_pl_local_poly[2] c_pl_local_poly[3]
dump bondlocal_dump all local ${nfreq_stress} &
    output_files/pair_data/bonds_${dataname}_${interaction}_${hold_tag}_c${compressions}.dump &
    c_bnd_ids[1] c_bnd_ids[2] c_bnd_ids[3] c_bnd_local[1] c_bnd_local[2]
if "${skip_widom} == 0" then &
    "dump widom_traj all custom ${nfreq_widom_dump} traj_files/widom_${dataname}_${interaction}_${hold_tag}_c${compressions}.lammpstrj id type x y z"

fix avg_stress_x_poly all ave/time ${nevery_stress} ${nrepeat_stress} ${nfreq_stress} &
    c_press_x_polymer mode vector file output_files/stress_data/stress_x_polymer_${dataname}_${interaction}_${hold_tag}_c${compressions}.dat
fix avg_stress_y_poly all ave/time ${nevery_stress} ${nrepeat_stress} ${nfreq_stress} &
    c_press_y_polymer mode vector file output_files/stress_data/stress_y_polymer_${dataname}_${interaction}_${hold_tag}_c${compressions}.dat
fix avg_stress_z_poly all ave/time ${nevery_stress} ${nrepeat_stress} ${nfreq_stress} &
    c_press_z_polymer mode vector file output_files/stress_data/stress_z_polymer_${dataname}_${interaction}_${hold_tag}_c${compressions}.dat
fix avg_stress_x_solv all ave/time ${nevery_stress} ${nrepeat_stress} ${nfreq_stress} &
    c_press_x_solvent mode vector file output_files/stress_data/stress_x_solvent_${dataname}_${interaction}_${hold_tag}_c${compressions}.dat
fix avg_stress_y_solv all ave/time ${nevery_stress} ${nrepeat_stress} ${nfreq_stress} &
    c_press_y_solvent mode vector file output_files/stress_data/stress_y_solvent_${dataname}_${interaction}_${hold_tag}_c${compressions}.dat
fix avg_stress_z_solv all ave/time ${nevery_stress} ${nrepeat_stress} ${nfreq_stress} &
    c_press_z_solvent mode vector file output_files/stress_data/stress_z_solvent_${dataname}_${interaction}_${hold_tag}_c${compressions}.dat
fix avg_stress_z_pist all ave/time ${nevery_stress} ${nrepeat_stress} ${nfreq_stress} &
    c_press_z_piston mode vector file output_files/stress_data/stress_z_piston_${dataname}_${interaction}_${hold_tag}_c${compressions}.dat
fix avg_stress_z_supp all ave/time ${nevery_stress} ${nrepeat_stress} ${nfreq_stress} &
    c_press_z_support mode vector file output_files/stress_data/stress_z_support_${dataname}_${interaction}_${hold_tag}_c${compressions}.dat

fix avg_sigmazz_poly all ave/time ${nevery_stress} ${nrepeat_stress} ${nfreq_stress} &
    c_sigmazz_poly mode vector file output_files/stress_data/sigmazz_polymer_${dataname}_${interaction}_${hold_tag}_c${compressions}.dat
fix avg_sigmazz_solv all ave/time ${nevery_stress} ${nrepeat_stress} ${nfreq_stress} &
    c_sigmazz_solv mode vector file output_files/stress_data/sigmazz_solvent_${dataname}_${interaction}_${hold_tag}_c${compressions}.dat
fix avg_virialzz_solv all ave/time ${nevery_stress} ${nrepeat_stress} ${nfreq_stress} &
    c_virialzz_solv mode vector file output_files/stress_data/virialzz_solvent_${dataname}_${interaction}_${hold_tag}_c${compressions}.dat
fix avg_sigmaxx_poly all ave/time ${nevery_stress} ${nrepeat_stress} ${nfreq_stress} &
    c_sigmaxx_poly mode vector file output_files/stress_data/sigmaxx_polymer_${dataname}_${interaction}_${hold_tag}_c${compressions}.dat
fix avg_sigmaxx_solv all ave/time ${nevery_stress} ${nrepeat_stress} ${nfreq_stress} &
    c_sigmaxx_solv mode vector file output_files/stress_data/sigmaxx_solvent_${dataname}_${interaction}_${hold_tag}_c${compressions}.dat
fix avg_sigmayy_poly all ave/time ${nevery_stress} ${nrepeat_stress} ${nfreq_stress} &
    c_sigmayy_poly mode vector file output_files/stress_data/sigmayy_polymer_${dataname}_${interaction}_${hold_tag}_c${compressions}.dat
fix avg_sigmayy_solv all ave/time ${nevery_stress} ${nrepeat_stress} ${nfreq_stress} &
    c_sigmayy_solv mode vector file output_files/stress_data/sigmayy_solvent_${dataname}_${interaction}_${hold_tag}_c${compressions}.dat

fix avg_sigmazz_poly_fs all ave/time ${nevery_stress} ${nrepeat_stress} ${nfreq_stress} &
    c_sigmazz_poly_fs mode vector file output_files/stress_data/sigmazz_polymer_fine_support_${dataname}_${interaction}_${hold_tag}_c${compressions}.dat
fix avg_sigmazz_poly_fp all ave/time ${nevery_stress} ${nrepeat_stress} ${nfreq_stress} &
    c_sigmazz_poly_fp mode vector file output_files/stress_data/sigmazz_polymer_fine_piston_${dataname}_${interaction}_${hold_tag}_c${compressions}.dat
fix avg_sigmazz_solv_fs all ave/time ${nevery_stress} ${nrepeat_stress} ${nfreq_stress} &
    c_sigmazz_solv_fs mode vector file output_files/stress_data/sigmazz_solvent_fine_support_${dataname}_${interaction}_${hold_tag}_c${compressions}.dat
fix avg_sigmazz_solv_fp all ave/time ${nevery_stress} ${nrepeat_stress} ${nfreq_stress} &
    c_sigmazz_solv_fp mode vector file output_files/stress_data/sigmazz_solvent_fine_piston_${dataname}_${interaction}_${hold_tag}_c${compressions}.dat

# Solvent density: use the STRESS cadence (not a separate density cadence) so
# the ave/chunk teardown lands on the SAME nfreq_stress epoch boundary as the
# run end -- guaranteeing a clean chunk/atom unlock before the next level.
fix avg_solv_density all ave/chunk ${nevery_stress} ${nrepeat_stress} ${nfreq_stress} &
    chunk_z_solv_density density/number density/mass &
    file output_files/chemical_potential/solvent_density_z_${dataname}_${interaction}_${hold_tag}_c${compressions}.dat
fix avg_solv_density_fs all ave/chunk ${nevery_stress} ${nrepeat_stress} ${nfreq_stress} &
    chunk_zf_dens_sup density/number density/mass &
    file output_files/chemical_potential/solvent_density_z_fine_support_${dataname}_${interaction}_${hold_tag}_c${compressions}.dat
fix avg_solv_density_fp all ave/chunk ${nevery_stress} ${nrepeat_stress} ${nfreq_stress} &
    chunk_zf_dens_pis density/number density/mass &
    file output_files/chemical_potential/solvent_density_z_fine_piston_${dataname}_${interaction}_${hold_tag}_c${compressions}.dat

fix avg_disp_z_poly all ave/chunk ${nevery_stress} ${nrepeat_stress} ${nfreq_stress} &
    chunk_z_polymer v_uz_poly &
    file output_files/displacement_data/disp_z_polymer_${dataname}_${interaction}_${hold_tag}_c${compressions}.dat

variable hold_steps equal (floor(($(step)+${hold_len}-1)/${nfreq_stress})+1)*${nfreq_stress}-$(step)
print ">>> [strain=${compressions}] measurement HOLD (piston frozen, stress relaxes) for ${hold_steps} steps (>= hold_len=${hold_len}, aligned to nfreq_stress=${nfreq_stress})"
run ${hold_steps}

# ----- Teardown this level's hold fixes/dumps (lock released on the epoch-
#       aligned end_of_step above) BEFORE the next increment. -----
unfix avg_disp_z_poly
unfix avg_solv_density_fp
unfix avg_solv_density_fs
unfix avg_solv_density
unfix avg_sigmazz_solv_fp
unfix avg_sigmazz_solv_fs
unfix avg_sigmazz_poly_fp
unfix avg_sigmazz_poly_fs
unfix avg_sigmayy_solv
unfix avg_sigmayy_poly
unfix avg_sigmaxx_solv
unfix avg_sigmaxx_poly
unfix avg_virialzz_solv
unfix avg_sigmazz_solv
unfix avg_sigmazz_poly
unfix avg_stress_z_supp
unfix avg_stress_z_pist
unfix avg_stress_z_solv
unfix avg_stress_y_solv
unfix avg_stress_x_solv
unfix avg_stress_z_poly
unfix avg_stress_y_poly
unfix avg_stress_x_poly
if "${skip_widom} == 0" then "undump widom_traj"
undump bondlocal_dump
undump pairlocal_poly
undump traj_stress_sync
undump pairlocal_dump
undump traj_flow

# ----- Teardown the loading+hold loggers -----
unfix out_gel_edges
unfix out_polymer_com
unfix out_box_dims
unfix out_gel_dims_rg
unfix out_gel_vol_rg
unfix out_gel_dims_bb
unfix out_gel_vol_bb
unfix out_gel_strain_thermo
unfix out_strain_piston
unfix out_strain_zz
unfix out_piston_force_avg
unfix out_piston_force
unfix out_piston_vel
unfix out_support_pos
unfix out_piston_pos

print ">>> Completed strain=${compressions}:  gel_strain_bb = $(v_gel_strain_bb:%.4f)  gel_strain_rg = $(v_gel_strain:%.4f)  step=$(step)"

variable hold_steps delete
variable piston_target_z  delete   # recomputed per level (new ${compressions}); delete to allow redefine
variable support_target_z delete
variable gap_target       delete
variable drive_dump_freq delete   # recomputed per level; delete to allow redefine

next compressions
jump SELF comp_loop


# ==========================================================================
#                            FINAL STATE
# ==========================================================================
print "========================================"
print "Triaxial compression stress-strain sweep complete"
print "  Final gel_strain: $(v_gel_strain:%.4f)"
print "  Final box: $(lx:%.3f) x $(ly:%.3f) x $(lz:%.3f)"
print "========================================"

# Close the whole-run convergence trackers
unfix trk_vol_bb
unfix trk_vol_rg
unfix trk_dims_rg
unfix trk_box

variable outfile string "final_tricomp_${dataname}_${interaction}_${hold_tag}"
write_data ${outfile}.data
