# ========== Slab equilibrating in solvent WITH SUPPORT ==========
# Variables loaded via bash script:
# - dataname: name of data file
# - interaction: epsSS_epsSP
# - nsteps: production run steps
# - oldsteps: previous timesteps (for restart)
# - totsteps: total cumulative timesteps
# - epsSS: solvent-solvent interaction strength
# - epsSP: solvent-polymer interaction strength

# Reduced LJ units: tau = sigma*sqrt(m/epsilon)
# (sigma = 1, m = 1, epsilon = 1.5)
# dt = 0.005 → 1e6 steps ≈ 4.1e3 tau


# ========== Simulation Parameters ==========
variable sigma equal 1.0
variable binWidth equal 2

# Time averaging parameters
variable nevery_avg_stress equal 100
variable nrepeat_avg_stress equal 1000 # 625 or 50
variable nfreq_avg_stress equal 10000 # 125000 or 10000

# Output frequencies
variable thermo_freq equal 10000
variable dump_freq equal 10000
variable volume_freq equal 10000

# ── Widom insertion / chemical potential ─────────────────────────────────────
# Produces 10 μ_ex(z) snapshots evenly spaced over the production run —
# same cadence as the 10 stress-profile curves in slab_with_flow.
# Each snapshot fires fix widom with M_widom ghost insertions per z-slab.
#
# N_widom_bins z-slabs divide [zlo, zhi] into equal-width bands via
# variable-bound regions that track the box during NPT fluctuations.
# Bin 1 is at the bottom (zlo), bin N is at the top (zhi).
#
# μ_ex output: output_files/chemical_potential/mu_z_*.dat
#   columns: step | μ_ex bin1 | μ_ex bin2 | ... | μ_ex bin20
# Solvent density output: output_files/chemical_potential/solvent_density_z_*.dat
#   (used to estimate partial molar volume V̄_s = 1/ρ_s per bin)
#
# NOTE: create output_files/chemical_potential/ before the run.
# ----- Continuation flag -----
# 0 = fresh start (default)  1 = continuation from a final .data file
# When cont=1 the push-off, minimization, gentle NVT thermalization, and NPT
# warm-up are all skipped — the data file already holds an equilibrated config.
variable cont       index 0
variable skip_widom index 0   # set to 1 via -var (run_lammps.sh reads SKIP_WIDOM env) to skip
                               # fix widom setup and cleanup — required when write_data is called
                               # mid-production (snapshot loop) because init() checks static bin
                               # boundaries that may be stale after NPT box compression

variable num_widom_curves equal 10     # time-snapshots of μ(z) for fix widom / fix print output
variable M_widom          equal 1000   # ghost-particle insertions per bin per snapshot
variable N_widom_bins     equal 20     # number of equal-width z-slabs
variable nfreq_widom      equal floor(${nsteps}/v_num_widom_curves)

# Cavity Widom dump cadence — decoupled from fix widom so we can write more
# frames for cavity_widom.py without changing fix widom averaging windows.
# More frames → lower noise in time-averaged μ_ex(z): noise ∝ 1/√num_widom_frames.
# 50 frames (vs 25) gives ~29% additional noise reduction at no additional compute cost;
# only I/O increases (~600 MB for 400k-atom system over 50 frames).
variable num_widom_frames equal 50
variable nfreq_widom_dump equal floor(${nsteps}/v_num_widom_frames)

# Equilibration parameters
variable temp_target equal 1.0
variable press_target index 1.5 # APPROPRIATE VALUE IMPORTANT — overridden by -var on command line
variable vel_seed     index 12345  # RNG seed for create_velocity; overridden by -var for replica sweeps
variable tdamp equal 1.0
variable pdamp equal 1.0
variable timestep_gentle equal 0.001
variable timestep_prod equal 0.005
variable nsteps_gentle equal 5000


# ========== Initialization ==========
units lj
dimension 3
boundary p p p
atom_style molecular
atom_modify map array

# Read initial data or restart
variable is_restart equal is_file(restart_${dataname}_${interaction}_${oldsteps}.restart)
variable restartFlag string file

# Force fresh start if oldsteps is 0
if "${oldsteps} == 0" then &
    "variable is_restart equal 0"

if "${is_restart} == 1" then &
    "read_restart restart_${dataname}_${interaction}_${oldsteps}.restart" &
else &
    "read_data data_files/${dataname}.data"

if "${is_restart} == 1" then &
    "variable restartFlag string append"


print ">>> is_restart = ${is_restart}"
print ">>> Previous    # of timesteps: ${oldsteps}"
print ">>> Current     # of timesteps: ${nsteps}"
print ">>> Cumulative  # of timesteps: ${totsteps}"

comm_modify cutoff 5.0


# ========== Group Definitions ==========
group polymer type 1 2
group solvent type 3
group support type 4
group piston type 5
group mobile type 1 2 3
group polymer_and_support type 1 2 4 5


# =====================================================================
#   PHASE 0 (fresh start only): SOFT PUSH-OFF
# =====================================================================
# Harmonic bonds pull beads to r₀ = 0.96σ without any divergence
# Soft pairs prevent pair overlaps with finite, bounded forces

if "${is_restart} == 0 && ${cont} == 0" then &
    "pair_style soft 1.122"              &
    "pair_coeff * * 50.0"              &
    "pair_coeff 4 4 0.0"              &
    "pair_coeff 5 5 0.0"              &
    "pair_coeff 4 5 0.0"              &
    "bond_style harmonic"              &
    "bond_coeff * 200.0 0.96"         &
    "special_bonds lj 0 1 1"

# Freeze support and piston during push-off
velocity support set 0.0 0.0 0.0
fix freeze_support support setforce 0.0 0.0 0.0
velocity piston set 0.0 0.0 0.0
fix freeze_piston piston setforce 0.0 0.0 0.0

# Thermo output for monitoring push-off
thermo_style custom step temp pe ke etotal press vol lx ly lz
thermo 1000

if "${is_restart} == 0 && ${cont} == 0" then &
    "velocity mobile create 0.01 ${vel_seed} mom yes rot no"   &
    "fix pushoff mobile nve/limit 0.05"                          &
    "fix lang_pushoff mobile langevin 0.01 0.01 ${tdamp} 904297" &
    "timestep ${timestep_gentle}"                        &
    "run 10000"                                          &
    "unfix pushoff"                                      &
    "unfix lang_pushoff"

# After push-off, bonds should be near 0.96σ. Check with thermo PE:
# PE should have dropped from ~10^19 to ~10^3 or lower.


# =====================================================================
#   PHASE 1: SWITCH TO PRODUCTION POTENTIALS
# =====================================================================
# Redefine pair and bond styles. This is required for both fresh and
# restart paths — on restart, read_restart restores styles, but we
# redefine them here for clarity and safety.

pair_style lj/cut 1.122                  # WAS 2.5
pair_coeff * * 1.0 ${sigma} 1.122        # WAS 2.5
pair_coeff 1 3 ${epsSP} ${sigma} 1.122 # WAS 2.5   # polymer-solvent
pair_coeff 2 3 ${epsSP} ${sigma} 1.122 # WAS 2.5   # crosslinker-solvent
pair_coeff 3 3 ${epsSS} ${sigma} 1.122 # WAS 2.5   # solvent-solvent
pair_coeff 1 4 1.0 ${sigma} 1.122       # polymer-support (WCA)
pair_coeff 2 4 1.0 ${sigma} 1.122       # crosslinker-support (WCA)
pair_coeff 3 4 0.0 ${sigma} 0.0        # solvent-support (off)
pair_coeff 4 4 0.0 ${sigma} 0.0        # support-support (off)
pair_coeff 1 5 1.0 ${sigma} 1.122       # polymer-piston (WCA)
pair_coeff 2 5 1.0 ${sigma} 1.122       # crosslinker-piston (WCA)
pair_coeff 3 5 1.0 ${sigma} 1.122       # solvent-piston (WCA)
pair_coeff 4 5 0.0 ${sigma} 0.0        # support-piston (off)
pair_coeff 5 5 0.0 ${sigma} 0.0        # piston-piston (off)

bond_style fene
bond_coeff * 30.0 1.5 1.0 1.0
special_bonds fene

# Neighbor list exclusions
neigh_modify exclude type 4 4   # support-support
neigh_modify exclude type 5 5   # piston-piston
neigh_modify exclude type 4 5   # support-piston

# Angle style (uncomment if angles present in data file)
#angle_style hybrid cosine harmonic
#angle_coeff 1 cosine 1.0
#angle_coeff 2 harmonic 40.0 109.47


# =====================================================================
#   PHASE 2: ENERGY MINIMIZATION
# =====================================================================
# Now safe — bonds are near 0.96σ (after push-off) or at equilibrium
# (after restart). Piston/support still frozen via setforce.

if "${is_restart} == 0 && ${cont} == 0" then &
    "minimize 1.0e-4 1.0e-6 10000 100000"

# Release piston: switch from setforce freeze to z-free rigid body
unfix freeze_piston
fix rigid_piston piston rigid single force * off off on torque * off off off


# =====================================================================
#   THERMO OUTPUT
# =====================================================================
thermo_style custom step temp pe ke etotal press vol lx ly lz
thermo ${thermo_freq}

# Trajectory output
dump poly_traj polymer_and_support custom ${dump_freq} traj_files/polymer_${dataname}_${interaction}_${totsteps}.lammpstrj id type mol x y z

# =====================================================================
#   PHASE 3: GENTLE NVT THERMALIZATION
# =====================================================================
if "${is_restart} == 0 && ${cont} == 0" then "reset_timestep 0"
if "${is_restart} == 0 && ${cont} == 0" then "velocity mobile create 0.01 ${vel_seed} mom yes rot no"
if "${is_restart} == 0 && ${cont} == 0" then "fix 1 mobile nve/limit 0.05"
if "${is_restart} == 0 && ${cont} == 0" then "fix 2 mobile langevin 0.01 ${temp_target} ${tdamp} 904297"
if "${is_restart} == 0 && ${cont} == 0" then "timestep ${timestep_gentle}"
if "${is_restart} == 0 && ${cont} == 0" then "run ${nsteps_gentle}"
if "${is_restart} == 0 && ${cont} == 0" then "unfix 1"
if "${is_restart} == 0 && ${cont} == 0" then "unfix 2"


# ========== Gel Volume Calculations ==========
# Method 1: Bounding box
compute minx polymer reduce min x
compute maxx polymer reduce max x
compute miny polymer reduce min y
compute maxy polymer reduce max y
compute minz polymer reduce min z
compute maxz polymer reduce max z

variable gel_lx equal c_maxx-c_minx
variable gel_ly equal c_maxy-c_miny
variable gel_lz equal c_maxz-c_minz
variable gel_vol_box equal v_gel_lx*v_gel_ly*v_gel_lz

# Method 2: Radius of gyration
compute rg_polymer polymer gyration
variable rg_cubed equal c_rg_polymer^3


# ========== Box Dimensions ==========
variable box_lx equal lx
variable box_ly equal ly
variable box_lz equal lz


# ========== NPT Equilibration ==========
#if "${is_restart} == 0" then "reset_timestep 0"
fix 1 mobile npt temp ${temp_target} ${temp_target} ${tdamp} iso ${press_target} ${press_target} ${pdamp} # dilate mobile fixedpoint $(lx/2) $(ly/2) 0
timestep ${timestep_prod}
if "${is_restart} == 0 && ${cont} == 0" then "run ${nsteps_gentle}"


# ========== Production Run with Time Averaging ==========

# Volume and dimension output
fix gel_vol_bb_output all print ${volume_freq} "${gel_vol_box}" &
    ${restartFlag} output_files/volume_data/gel_volume_bb_${dataname}_${interaction}_${totsteps}.dat screen no

fix gel_vol_rg_output all print ${volume_freq} "$(step) ${rg_cubed}" &
    ${restartFlag} output_files/volume_data/gel_volume_rg_${dataname}_${interaction}_${totsteps}.dat screen no

fix gel_dims_output all print ${volume_freq} "$(step) ${gel_lx} ${gel_ly} ${gel_lz}" &
    ${restartFlag} output_files/volume_data/gel_dimensions_${dataname}_${interaction}_${totsteps}.dat screen no

fix box_dims_output all print ${volume_freq} "$(step) ${box_lx} ${box_ly} ${box_lz}" &
    ${restartFlag} output_files/volume_data/box_dimensions_${dataname}_${interaction}_${totsteps}.dat screen no


# =====================================================================
#   CHEMICAL POTENTIAL: WIDOM TEST-PARTICLE INSERTION
#   Skipped when skip_widom=1 (volmix sweeps) — write_data mid-loop
#   triggers init() which re-validates the static bin regions; at high P*
#   NPT compression can push those boundaries outside the current box.
# =====================================================================
if "${skip_widom} == 1" then "jump SELF widom_setup_skip"
shell mkdir -p output_files/chemical_potential
# 20 equal-width z-slabs with variable-bound regions — tracks NPT box.
# One fix widom per slab fires every nfreq_widom steps (= nsteps/10),
# attempting M_widom ghost insertions of type-3 (solvent) atoms.
# fix widom outputs the Widom excess chemical potential μ_ex for the
# most recent evaluation window as f_widom_bN[1].
#
# The fix print fires on the same schedule as the widom fixes
# (both use nfreq_widom), so the output captures freshly-computed values.
# ${restartFlag} = "file" on fresh start, "append" on restart.
#
# Ideal-gas correction: μ = μ_ex + k_B T ln(ρ_s Λ³).  For pore-pressure
# differences only Δμ_ex(z) matters (the ideal term cancels if T is uniform
# and Λ is the same everywhere, which it is for LJ atoms).

# ----- Bin boundary variables (equal-style; evaluated once via ${} substitution) -----
# w_dz and w_zN are equal-style variables whose values are read once via ${w_zN}
# when the region commands below are parsed.  At that point the box is at its
# NPT-equilibrated dimensions, so the 20 bins uniformly tile [zlo, zhi].
variable w_dz  equal (zhi-zlo)/${N_widom_bins}

variable w_z1  equal zlo+ 1.0*v_w_dz
variable w_z2  equal zlo+ 2.0*v_w_dz
variable w_z3  equal zlo+ 3.0*v_w_dz
variable w_z4  equal zlo+ 4.0*v_w_dz
variable w_z5  equal zlo+ 5.0*v_w_dz
variable w_z6  equal zlo+ 6.0*v_w_dz
variable w_z7  equal zlo+ 7.0*v_w_dz
variable w_z8  equal zlo+ 8.0*v_w_dz
variable w_z9  equal zlo+ 9.0*v_w_dz
variable w_z10 equal zlo+10.0*v_w_dz
variable w_z11 equal zlo+11.0*v_w_dz
variable w_z12 equal zlo+12.0*v_w_dz
variable w_z13 equal zlo+13.0*v_w_dz
variable w_z14 equal zlo+14.0*v_w_dz
variable w_z15 equal zlo+15.0*v_w_dz
variable w_z16 equal zlo+16.0*v_w_dz
variable w_z17 equal zlo+17.0*v_w_dz
variable w_z18 equal zlo+18.0*v_w_dz
variable w_z19 equal zlo+19.0*v_w_dz

# ----- z-slab regions (static: ${} substitution freezes bounds at creation time) -----
# fix widom requires regions with a computable bounding box, which means the
# bounds must be static numerics — not dynamic v_ variable references.
# ${w_zN} evaluates the equal-style variable once when this line is reached
# (after the NPT warm-up, so the box is at its equilibrated dimensions) and
# substitutes the result as a literal number.  The region is therefore static
# and fix widom can compute its bounding box without error.
# Note: NPT box fluctuations during the production run are small (<1%) for an
# already-equilibrated system, so fixed bin boundaries are a good approximation.
region widom_bin1  block EDGE EDGE EDGE EDGE EDGE      ${w_z1}  side in
region widom_bin2  block EDGE EDGE EDGE EDGE ${w_z1}  ${w_z2}  side in
region widom_bin3  block EDGE EDGE EDGE EDGE ${w_z2}  ${w_z3}  side in
region widom_bin4  block EDGE EDGE EDGE EDGE ${w_z3}  ${w_z4}  side in
region widom_bin5  block EDGE EDGE EDGE EDGE ${w_z4}  ${w_z5}  side in
region widom_bin6  block EDGE EDGE EDGE EDGE ${w_z5}  ${w_z6}  side in
region widom_bin7  block EDGE EDGE EDGE EDGE ${w_z6}  ${w_z7}  side in
region widom_bin8  block EDGE EDGE EDGE EDGE ${w_z7}  ${w_z8}  side in
region widom_bin9  block EDGE EDGE EDGE EDGE ${w_z8}  ${w_z9}  side in
region widom_bin10 block EDGE EDGE EDGE EDGE ${w_z9}  ${w_z10} side in
region widom_bin11 block EDGE EDGE EDGE EDGE ${w_z10} ${w_z11} side in
region widom_bin12 block EDGE EDGE EDGE EDGE ${w_z11} ${w_z12} side in
region widom_bin13 block EDGE EDGE EDGE EDGE ${w_z12} ${w_z13} side in
region widom_bin14 block EDGE EDGE EDGE EDGE ${w_z13} ${w_z14} side in
region widom_bin15 block EDGE EDGE EDGE EDGE ${w_z14} ${w_z15} side in
region widom_bin16 block EDGE EDGE EDGE EDGE ${w_z15} ${w_z16} side in
region widom_bin17 block EDGE EDGE EDGE EDGE ${w_z16} ${w_z17} side in
region widom_bin18 block EDGE EDGE EDGE EDGE ${w_z17} ${w_z18} side in
region widom_bin19 block EDGE EDGE EDGE EDGE ${w_z18} ${w_z19} side in
region widom_bin20 block EDGE EDGE EDGE EDGE ${w_z19} EDGE      side in

# ----- fix widom: one per z-slab, unique seed per fix -----
# Group = all: ghost particle interacts with all atom types (polymer,
# support, piston) — correct for measuring the total solvent insertion cost.
# Type 3 = solvent.  No full_energy needed for lj/cut without kspace.
fix widom_b1  all widom ${nfreq_widom} ${M_widom} 3 12345 ${temp_target} region widom_bin1
fix widom_b2  all widom ${nfreq_widom} ${M_widom} 3 12346 ${temp_target} region widom_bin2
fix widom_b3  all widom ${nfreq_widom} ${M_widom} 3 12347 ${temp_target} region widom_bin3
fix widom_b4  all widom ${nfreq_widom} ${M_widom} 3 12348 ${temp_target} region widom_bin4
fix widom_b5  all widom ${nfreq_widom} ${M_widom} 3 12349 ${temp_target} region widom_bin5
fix widom_b6  all widom ${nfreq_widom} ${M_widom} 3 12350 ${temp_target} region widom_bin6
fix widom_b7  all widom ${nfreq_widom} ${M_widom} 3 12351 ${temp_target} region widom_bin7
fix widom_b8  all widom ${nfreq_widom} ${M_widom} 3 12352 ${temp_target} region widom_bin8
fix widom_b9  all widom ${nfreq_widom} ${M_widom} 3 12353 ${temp_target} region widom_bin9
fix widom_b10 all widom ${nfreq_widom} ${M_widom} 3 12354 ${temp_target} region widom_bin10
fix widom_b11 all widom ${nfreq_widom} ${M_widom} 3 12355 ${temp_target} region widom_bin11
fix widom_b12 all widom ${nfreq_widom} ${M_widom} 3 12356 ${temp_target} region widom_bin12
fix widom_b13 all widom ${nfreq_widom} ${M_widom} 3 12357 ${temp_target} region widom_bin13
fix widom_b14 all widom ${nfreq_widom} ${M_widom} 3 12358 ${temp_target} region widom_bin14
fix widom_b15 all widom ${nfreq_widom} ${M_widom} 3 12359 ${temp_target} region widom_bin15
fix widom_b16 all widom ${nfreq_widom} ${M_widom} 3 12360 ${temp_target} region widom_bin16
fix widom_b17 all widom ${nfreq_widom} ${M_widom} 3 12361 ${temp_target} region widom_bin17
fix widom_b18 all widom ${nfreq_widom} ${M_widom} 3 12362 ${temp_target} region widom_bin18
fix widom_b19 all widom ${nfreq_widom} ${M_widom} 3 12363 ${temp_target} region widom_bin19
fix widom_b20 all widom ${nfreq_widom} ${M_widom} 3 12364 ${temp_target} region widom_bin20

# ----- μ_ex(z) profile output -----
# One line per nfreq_widom step: step and the 20 bin μ_ex values.
# Bin k center ≈ zlo + (k - 0.5) * w_dz  (compute in post-processing
# using box_dimensions output for lz).
fix out_mu_z all print ${nfreq_widom} &
    "$(step) $(f_widom_b1[1]) $(f_widom_b2[1]) $(f_widom_b3[1]) $(f_widom_b4[1]) $(f_widom_b5[1]) $(f_widom_b6[1]) $(f_widom_b7[1]) $(f_widom_b8[1]) $(f_widom_b9[1]) $(f_widom_b10[1]) $(f_widom_b11[1]) $(f_widom_b12[1]) $(f_widom_b13[1]) $(f_widom_b14[1]) $(f_widom_b15[1]) $(f_widom_b16[1]) $(f_widom_b17[1]) $(f_widom_b18[1]) $(f_widom_b19[1]) $(f_widom_b20[1])" &
    ${restartFlag} output_files/chemical_potential/mu_z_${dataname}_${interaction}_${totsteps}.dat screen no

# ----- Solvent number density profile (for V̄_s = 1/ρ_s estimation) -----
# V̄_s = 1/ρ_s(z) gives the local partial molar volume per bin.
# In the incompressible limit V̄_s should be uniform; any deviation inside
# the gel (reduced ρ_s from polymer exclusion) is expected and is the
# quantity to compare between reservoir and gel regions.
#
# Timing: derived from nfreq_widom so the density snapshots align with the
# μ_ex snapshots.  nevery_density=100 (near stress decorrelation time),
# nrepeat_density=nfreq_widom/100, nfreq_density=nevery*nrepeat (exact).
# This avoids reusing nevery_avg_stress/nfreq_avg_stress which are defined
# for a different purpose and may not satisfy nfreq=nevery*nrepeat.
variable nevery_density  equal 100
variable nrepeat_density equal floor(v_nfreq_widom/v_nevery_density)
variable nfreq_density   equal v_nevery_density*v_nrepeat_density
print ">>> Density: nevery=${nevery_density} nrepeat=${nrepeat_density} nfreq=${nfreq_density}"

compute chunk_z_solv_density solvent chunk/atom bin/1d z lower ${binWidth}
fix avg_solv_density all ave/chunk ${nevery_density} ${nrepeat_density} ${nfreq_density} &
    chunk_z_solv_density density/number &
    file output_files/chemical_potential/solvent_density_z_${dataname}_${interaction}_${totsteps}.dat

# ----- All-atom trajectory for cavity-biased Widom post-processing -----
# The standard polymer dump (poly_traj) saves only polymer_and_support atoms.
# cavity_widom.py needs ALL atoms (including solvent) to compute WCA insertion
# energies correctly, so we dump a separate all-atom trajectory at the same
# cadence as the fix widom fires.
dump widom_traj all custom ${nfreq_widom_dump} traj_files/widom_${dataname}_${interaction}_${totsteps}.lammpstrj id type x y z

label widom_setup_skip   # jump target when skip_widom=1

# Production run — split into n_snaps sequential blocks; write a data snapshot after each.
# Snapshot files: final_config_${dataname}_${interaction}_${totsteps}_snap<N>.data
# volmix_sweep isolates each snapshot independently so ΔV_mix error bars capture
# both snapshot-to-snapshot composition variance AND thermal (NPT-replica) variance.
variable n_snaps        index 3   # snapshots per run; override with -var n_snaps N
variable steps_per_snap equal round(${nsteps}/${n_snaps})

if "${cont} == 1" then "print '>>> Continuing after ${oldsteps} timesteps'"
fix remove_drift mobile momentum 1000 linear 1 1 1 angular

variable snap_i loop ${n_snaps}
label snap_loop
    run ${steps_per_snap}
    write_data final_config_${dataname}_${interaction}_${totsteps}_snap${snap_i}.data
    print ">>> Wrote snapshot ${snap_i}/${n_snaps} at step $(step)"
    next snap_i
    jump SELF snap_loop


# ========== Cleanup ==========
unfix 1
unfix remove_drift
undump poly_traj
if "${skip_widom} == 0" then "undump widom_traj"

# Widom / chemical potential cleanup (skipped when skip_widom=1)
if "${skip_widom} == 1" then "jump SELF widom_cleanup_skip"
unfix widom_b1
unfix widom_b2
unfix widom_b3
unfix widom_b4
unfix widom_b5
unfix widom_b6
unfix widom_b7
unfix widom_b8
unfix widom_b9
unfix widom_b10
unfix widom_b11
unfix widom_b12
unfix widom_b13
unfix widom_b14
unfix widom_b15
unfix widom_b16
unfix widom_b17
unfix widom_b18
unfix widom_b19
unfix widom_b20
unfix out_mu_z
unfix avg_solv_density
uncompute chunk_z_solv_density
label widom_cleanup_skip


# ========== Save Final Configuration ==========
write_restart restart_${dataname}_${interaction}_${totsteps}.restart
write_data final_config_${dataname}_${interaction}_${totsteps}.data
# (identical to snap${n_snaps}; retained for backward compatibility)
